# OpenSim document version 40600
Model 10_link_pendulum:
  CoordinateActuator tau0: coordinate=q0 optimal_force=1
  CoordinateActuator tau1: coordinate=q1 optimal_force=1
  CoordinateActuator tau2: coordinate=q2 optimal_force=1
  CoordinateActuator tau3: coordinate=q3 optimal_force=1
  CoordinateActuator tau4: coordinate=q4 optimal_force=1
  CoordinateActuator tau5: coordinate=q5 optimal_force=1
  CoordinateActuator tau6: coordinate=q6 optimal_force=1
  CoordinateActuator tau7: coordinate=q7 optimal_force=1
  CoordinateActuator tau8: coordinate=q8 optimal_force=1
  CoordinateActuator tau9: coordinate=q9 optimal_force=1
  Ground
  BodySet:
    Body b0: mass=1 [kg] mass_center=(0 0 0) inertia=(1 1 1 0 0 0)
      PhysicalOffsetFrame b0center: socket_parent=.. translation=(-0.5 0 0) [meters]
        Ellipsoid b0center_geom_1: radii=(0.5 0.1 0.1)
    Body b1: mass=1 mass_center=(0 0 0) inertia=(1 1 1 0 0 0)
      PhysicalOffsetFrame b1center: socket_parent=.. translation=(-0.5 0 0)
        Ellipsoid b1center_geom_1: radii=(0.5 0.1 0.1)
    Body b2: mass=1 mass_center=(0 0 0) inertia=(1 1 1 0 0 0)
      PhysicalOffsetFrame b2center: socket_parent=.. translation=(-0.5 0 0)
        Ellipsoid b2center_geom_1: radii=(0.5 0.1 0.1)
    Body b3: mass=1 mass_center=(0 0 0) inertia=(1 1 1 0 0 0)
      PhysicalOffsetFrame b3center: socket_parent=.. translation=(-0.5 0 0)
        Ellipsoid b3center_geom_1: radii=(0.5 0.1 0.1)
    Body b4: mass=1 mass_center=(0 0 0) inertia=(1 1 1 0 0 0)
      PhysicalOffsetFrame b4center: socket_parent=.. translation=(-0.5 0 0)
        Ellipsoid b4center_geom_1: radii=(0.5 0.1 0.1)
    Body b5: mass=1 mass_center=(0 0 0) inertia=(1 1 1 0 0 0)
      PhysicalOffsetFrame b5center: socket_parent=.. translation=(-0.5 0 0)
        Ellipsoid b5center_geom_1: radii=(0.5 0.1 0.1)
    Body b6: mass=1 mass_center=(0 0 0) inertia=(1 1 1 0 0 0)
      PhysicalOffsetFrame b6center: socket_parent=.. translation=(-0.5 0 0)
        Ellipsoid b6center_geom_1: radii=(0.5 0.1 0.1)
    Body b7: mass=1 mass_center=(0 0 0) inertia=(1 1 1 0 0 0)
      PhysicalOffsetFrame b7center: socket_parent=.. translation=(-0.5 0 0)
        Ellipsoid b7center_geom_1: radii=(0.5 0.1 0.1)
    Body b8: mass=1 mass_center=(0 0 0) inertia=(1 1 1 0 0 0)
      PhysicalOffsetFrame b8center: socket_parent=.. translation=(-0.5 0 0)
        Ellipsoid b8center_geom_1: radii=(0.5 0.1 0.1)
    Body b9: mass=1 mass_center=(0 0 0) inertia=(1 1 1 0 0 0)
      PhysicalOffsetFrame b9center: socket_parent=.. translation=(-0.5 0 0)
        Ellipsoid b9center_geom_1: radii=(0.5 0.1 0.1)
  JointSet:
    PinJoint j0: socket_parent_frame=ground_offset socket_child_frame=b0_offset
      Coordinate q0
      PhysicalOffsetFrame ground_offset: socket_parent=/ground translation=(0 0 0)
      PhysicalOffsetFrame b0_offset: socket_parent=/bodyset/b0 translation=(-1 0 0)
    PinJoint j1: socket_parent_frame=b0_offset socket_child_frame=b1_offset
      Coordinate q1
      PhysicalOffsetFrame b0_offset: socket_parent=/bodyset/b0 translation=(0 0 0)
      PhysicalOffsetFrame b1_offset: socket_parent=/bodyset/b1 translation=(-1 0 0)
    PinJoint j2: socket_parent_frame=b1_offset socket_child_frame=b2_offset
      Coordinate q2
      PhysicalOffsetFrame b1_offset: socket_parent=/bodyset/b1 translation=(0 0 0)
      PhysicalOffsetFrame b2_offset: socket_parent=/bodyset/b2 translation=(-1 0 0)
    PinJoint j3: socket_parent_frame=b2_offset socket_child_frame=b3_offset
      Coordinate q3
      PhysicalOffsetFrame b2_offset: socket_parent=/bodyset/b2 translation=(0 0 0)
      PhysicalOffsetFrame b3_offset: socket_parent=/bodyset/b3 translation=(-1 0 0)
    PinJoint j4: socket_parent_frame=b3_offset socket_child_frame=b4_offset
      Coordinate q4
      PhysicalOffsetFrame b3_offset: socket_parent=/bodyset/b3 translation=(0 0 0)
      PhysicalOffsetFrame b4_offset: socket_parent=/bodyset/b4 translation=(-1 0 0)
    PinJoint j5: socket_parent_frame=b4_offset socket_child_frame=b5_offset
      Coordinate q5
      PhysicalOffsetFrame b4_offset: socket_parent=/bodyset/b4 translation=(0 0 0)
      PhysicalOffsetFrame b5_offset: socket_parent=/bodyset/b5 translation=(-1 0 0)
    PinJoint j6: socket_parent_frame=b5_offset socket_child_frame=b6_offset
      Coordinate q6
      PhysicalOffsetFrame b5_offset: socket_parent=/bodyset/b5 translation=(0 0 0)
      PhysicalOffsetFrame b6_offset: socket_parent=/bodyset/b6 translation=(-1 0 0)
    PinJoint j7: socket_parent_frame=b6_offset socket_child_frame=b7_offset
      Coordinate q7
      PhysicalOffsetFrame b6_offset: socket_parent=/bodyset/b6 translation=(0 0 0)
      PhysicalOffsetFrame b7_offset: socket_parent=/bodyset/b7 translation=(-1 0 0)
    PinJoint j8: socket_parent_frame=b7_offset socket_child_frame=b8_offset
      Coordinate q8
      PhysicalOffsetFrame b7_offset: socket_parent=/bodyset/b7 translation=(0 0 0)
      PhysicalOffsetFrame b8_offset: socket_parent=/bodyset/b8 translation=(-1 0 0)
    PinJoint j9: socket_parent_frame=b8_offset socket_child_frame=b9_offset
      Coordinate q9
      PhysicalOffsetFrame b8_offset: socket_parent=/bodyset/b8 translation=(0 0 0)
      PhysicalOffsetFrame b9_offset: socket_parent=/bodyset/b9 translation=(-1 0 0)
  MarkerSet:
    Marker marker0: b0 (0 0 0)
    Marker marker1: b1 (0 0 0)
    Marker marker2: b2 (0 0 0)
    Marker marker3: b3 (0 0 0)
    Marker marker4: b4 (0 0 0)
    Marker marker5: b5 (0 0 0)
    Marker marker6: b6 (0 0 0)
    Marker marker7: b7 (0 0 0)
    Marker marker8: b8 (0 0 0)
    Marker marker9: b9 (0 0 0)
