# OpenSim document version 40600
Model pendulum:
  CoordinateActuator tau0: coordinate=q0 optimal_force=1
  Ground
  BodySet:
    Body b0: mass=1 [kg] mass_center=(0 0 0) inertia=(1 1 1 0 0 0)
      PhysicalOffsetFrame b0center: socket_parent=.. translation=(-0.5 0 0) [meters]
        Ellipsoid b0center_geom_1: radii=(0.5 0.1 0.1)
  JointSet:
    PinJoint j0: socket_parent_frame=ground_offset socket_child_frame=b0_offset
      Coordinate q0
      PhysicalOffsetFrame ground_offset: socket_parent=/ground translation=(0 0 0)
      PhysicalOffsetFrame b0_offset: socket_parent=/bodyset/b0 translation=(-1 0 0)
  MarkerSet:
    Marker marker0: b0 (0 0 0)
