# OpenSim document version 40600
Model 20_link_pendulum:
  CoordinateActuator tau0: coordinate=q0 optimal_force=1
  CoordinateActuator tau1: coordinate=q1 optimal_force=1
  CoordinateActuator tau2: coordinate=q2 optimal_force=1
  CoordinateActuator tau3: coordinate=q3 optimal_force=1
  CoordinateActuator tau4: coordinate=q4 optimal_force=1
  CoordinateActuator tau5: coordinate=q5 optimal_force=1
  CoordinateActuator tau6: coordinate=q6 optimal_force=1
  CoordinateActuator tau7: coordinate=q7 optimal_force=1
  CoordinateActuator tau8: coordinate=q8 optimal_force=1
  CoordinateActuator tau9: coordinate=q9 optimal_force=1
  CoordinateActuator tau10: coordinate=q10 optimal_force=1
  CoordinateActuator tau11: coordinate=q11 optimal_force=1
  CoordinateActuator tau12: coordinate=q12 optimal_force=1
  CoordinateActuator tau13: coordinate=q13 optimal_force=1
  CoordinateActuator tau14: coordinate=q14 optimal_force=1
  CoordinateActuator tau15: coordinate=q15 optimal_force=1
  CoordinateActuator tau16: coordinate=q16 optimal_force=1
  CoordinateActuator tau17: coordinate=q17 optimal_force=1
  CoordinateActuator tau18: coordinate=q18 optimal_force=1
  CoordinateActuator tau19: coordinate=q19 optimal_force=1
  Ground
  BodySet:
    Body b0: mass=1 [kg] mass_center=(0 0 0) inertia=(1 1 1 0 0 0)
      PhysicalOffsetFrame b0center: socket_parent=.. translation=(-0.5 0 0) [meters]
        Ellipsoid b0center_geom_1: radii=(0.5 0.1 0.1)
    Body b1: mass=1 mass_center=(0 0 0) inertia=(1 1 1 0 0 0)
      PhysicalOffsetFrame b1center: socket_parent=.. translation=(-0.5 0 0)
        Ellipsoid b1center_geom_1: radii=(0.5 0.1 0.1)
    Body b2: mass=1 mass_center=(0 0 0) inertia=(1 1 1 0 0 0)
      PhysicalOffsetFrame b2center: socket_parent=.. translation=(-0.5 0 0)
        Ellipsoid b2center_geom_1: radii=(0.5 0.1 0.1)
    Body b3: mass=1 mass_center=(0 0 0) inertia=(1 1 1 0 0 0)
      PhysicalOffsetFrame b3center: socket_parent=.. translation=(-0.5 0 0)
        Ellipsoid b3center_geom_1: radii=(0.5 0.1 0.1)
    Body b4: mass=1 mass_center=(0 0 0) inertia=(1 1 1 0 0 0)
      PhysicalOffsetFrame b4center: socket_parent=.. translation=(-0.5 0 0)
        Ellipsoid b4center_geom_1: radii=(0.5 0.1 0.1)
    Body b5: mass=1 mass_center=(0 0 0) inertia=(1 1 1 0 0 0)
      PhysicalOffsetFrame b5center: socket_parent=.. translation=(-0.5 0 0)
        Ellipsoid b5center_geom_1: radii=(0.5 0.1 0.1)
    Body b6: mass=1 mass_center=(0 0 0) inertia=(1 1 1 0 0 0)
      PhysicalOffsetFrame b6center: socket_parent=.. translation=(-0.5 0 0)
        Ellipsoid b6center_geom_1: radii=(0.5 0.1 0.1)
    Body b7: mass=1 mass_center=(0 0 0) inertia=(1 1 1 0 0 0)
      PhysicalOffsetFrame b7center: socket_parent=.. translation=(-0.5 0 0)
        Ellipsoid b7center_geom_1: radii=(0.5 0.1 0.1)
    Body b8: mass=1 mass_center=(0 0 0) inertia=(1 1 1 0 0 0)
      PhysicalOffsetFrame b8center: socket_parent=.. translation=(-0.5 0 0)
        Ellipsoid b8center_geom_1: radii=(0.5 0.1 0.1)
    Body b9: mass=1 mass_center=(0 0 0) inertia=(1 1 1 0 0 0)
      PhysicalOffsetFrame b9center: socket_parent=.. translation=(-0.5 0 0)
        Ellipsoid b9center_geom_1: radii=(0.5 0.1 0.1)
    Body b10: mass=1 mass_center=(0 0 0) inertia=(1 1 1 0 0 0)
      PhysicalOffsetFrame b10center: socket_parent=.. translation=(-0.5 0 0)
        Ellipsoid b10center_geom_1: radii=(0.5 0.1 0.1)
    Body b11: mass=1 mass_center=(0 0 0) inertia=(1 1 1 0 0 0)
      PhysicalOffsetFrame b11center: socket_parent=.. translation=(-0.5 0 0)
        Ellipsoid b11center_geom_1: radii=(0.5 0.1 0.1)
    Body b12: mass=1 mass_center=(0 0 0) inertia=(1 1 1 0 0 0)
      PhysicalOffsetFrame b12center: socket_parent=.. translation=(-0.5 0 0)
        Ellipsoid b12center_geom_1: radii=(0.5 0.1 0.1)
    Body b13: mass=1 mass_center=(0 0 0) inertia=(1 1 1 0 0 0)
      PhysicalOffsetFrame b13center: socket_parent=.. translation=(-0.5 0 0)
        Ellipsoid b13center_geom_1: radii=(0.5 0.1 0.1)
    Body b14: mass=1 mass_center=(0 0 0) inertia=(1 1 1 0 0 0)
      PhysicalOffsetFrame b14center: socket_parent=.. translation=(-0.5 0 0)
        Ellipsoid b14center_geom_1: radii=(0.5 0.1 0.1)
    Body b15: mass=1 mass_center=(0 0 0) inertia=(1 1 1 0 0 0)
      PhysicalOffsetFrame b15center: socket_parent=.. translation=(-0.5 0 0)
        Ellipsoid b15center_geom_1: radii=(0.5 0.1 0.1)
    Body b16: mass=1 mass_center=(0 0 0) inertia=(1 1 1 0 0 0)
      PhysicalOffsetFrame b16center: socket_parent=.. translation=(-0.5 0 0)
        Ellipsoid b16center_geom_1: radii=(0.5 0.1 0.1)
    Body b17: mass=1 mass_center=(0 0 0) inertia=(1 1 1 0 0 0)
      PhysicalOffsetFrame b17center: socket_parent=.. translation=(-0.5 0 0)
        Ellipsoid b17center_geom_1: radii=(0.5 0.1 0.1)
    Body b18: mass=1 mass_center=(0 0 0) inertia=(1 1 1 0 0 0)
      PhysicalOffsetFrame b18center: socket_parent=.. translation=(-0.5 0 0)
        Ellipsoid b18center_geom_1: radii=(0.5 0.1 0.1)
    Body b19: mass=1 mass_center=(0 0 0) inertia=(1 1 1 0 0 0)
      PhysicalOffsetFrame b19center: socket_parent=.. translation=(-0.5 0 0)
        Ellipsoid b19center_geom_1: radii=(0.5 0.1 0.1)
  JointSet:
    PinJoint j0: socket_parent_frame=ground_offset socket_child_frame=b0_offset
      Coordinate q0
      PhysicalOffsetFrame ground_offset: socket_parent=/ground translation=(0 0 0)
      PhysicalOffsetFrame b0_offset: socket_parent=/bodyset/b0 translation=(-1 0 0)
    PinJoint j1: socket_parent_frame=b0_offset socket_child_frame=b1_offset
      Coordinate q1
      PhysicalOffsetFrame b0_offset: socket_parent=/bodyset/b0 translation=(0 0 0)
      PhysicalOffsetFrame b1_offset: socket_parent=/bodyset/b1 translation=(-1 0 0)
    PinJoint j2: socket_parent_frame=b1_offset socket_child_frame=b2_offset
      Coordinate q2
      PhysicalOffsetFrame b1_offset: socket_parent=/bodyset/b1 translation=(0 0 0)
      PhysicalOffsetFrame b2_offset: socket_parent=/bodyset/b2 translation=(-1 0 0)
    PinJoint j3: socket_parent_frame=b2_offset socket_child_frame=b3_offset
      Coordinate q3
      PhysicalOffsetFrame b2_offset: socket_parent=/bodyset/b2 translation=(0 0 0)
      PhysicalOffsetFrame b3_offset: socket_parent=/bodyset/b3 translation=(-1 0 0)
    PinJoint j4: socket_parent_frame=b3_offset socket_child_frame=b4_offset
      Coordinate q4
      PhysicalOffsetFrame b3_offset: socket_parent=/bodyset/b3 translation=(0 0 0)
      PhysicalOffsetFrame b4_offset: socket_parent=/bodyset/b4 translation=(-1 0 0)
    PinJoint j5: socket_parent_frame=b4_offset socket_child_frame=b5_offset
      Coordinate q5
      PhysicalOffsetFrame b4_offset: socket_parent=/bodyset/b4 translation=(0 0 0)
      PhysicalOffsetFrame b5_offset: socket_parent=/bodyset/b5 translation=(-1 0 0)
    PinJoint j6: socket_parent_frame=b5_offset socket_child_frame=b6_offset
      Coordinate q6
      PhysicalOffsetFrame b5_offset: socket_parent=/bodyset/b5 translation=(0 0 0)
      PhysicalOffsetFrame b6_offset: socket_parent=/bodyset/b6 translation=(-1 0 0)
    PinJoint j7: socket_parent_frame=b6_offset socket_child_frame=b7_offset
      Coordinate q7
      PhysicalOffsetFrame b6_offset: socket_parent=/bodyset/b6 translation=(0 0 0)
      PhysicalOffsetFrame b7_offset: socket_parent=/bodyset/b7 translation=(-1 0 0)
    PinJoint j8: socket_parent_frame=b7_offset socket_child_frame=b8_offset
      Coordinate q8
      PhysicalOffsetFrame b7_offset: socket_parent=/bodyset/b7 translation=(0 0 0)
      PhysicalOffsetFrame b8_offset: socket_parent=/bodyset/b8 translation=(-1 0 0)
    PinJoint j9: socket_parent_frame=b8_offset socket_child_frame=b9_offset
      Coordinate q9
      PhysicalOffsetFrame b8_offset: socket_parent=/bodyset/b8 translation=(0 0 0)
      PhysicalOffsetFrame b9_offset: socket_parent=/bodyset/b9 translation=(-1 0 0)
    PinJoint j10: socket_parent_frame=b9_offset socket_child_frame=b10_offset
      Coordinate q10
      PhysicalOffsetFrame b9_offset: socket_parent=/bodyset/b9 translation=(0 0 0)
      PhysicalOffsetFrame b10_offset: socket_parent=/bodyset/b10 translation=(-1 0 0)
    PinJoint j11: socket_parent_frame=b10_offset socket_child_frame=b11_offset
      Coordinate q11
      PhysicalOffsetFrame b10_offset: socket_parent=/bodyset/b10 translation=(0 0 0)
      PhysicalOffsetFrame b11_offset: socket_parent=/bodyset/b11 translation=(-1 0 0)
    PinJoint j12: socket_parent_frame=b11_offset socket_child_frame=b12_offset
      Coordinate q12
      PhysicalOffsetFrame b11_offset: socket_parent=/bodyset/b11 translation=(0 0 0)
      PhysicalOffsetFrame b12_offset: socket_parent=/bodyset/b12 translation=(-1 0 0)
    PinJoint j13: socket_parent_frame=b12_offset socket_child_frame=b13_offset
      Coordinate q13
      PhysicalOffsetFrame b12_offset: socket_parent=/bodyset/b12 translation=(0 0 0)
      PhysicalOffsetFrame b13_offset: socket_parent=/bodyset/b13 translation=(-1 0 0)
    PinJoint j14: socket_parent_frame=b13_offset socket_child_frame=b14_offset
      Coordinate q14
      PhysicalOffsetFrame b13_offset: socket_parent=/bodyset/b13 translation=(0 0 0)
      PhysicalOffsetFrame b14_offset: socket_parent=/bodyset/b14 translation=(-1 0 0)
    PinJoint j15: socket_parent_frame=b14_offset socket_child_frame=b15_offset
      Coordinate q15
      PhysicalOffsetFrame b14_offset: socket_parent=/bodyset/b14 translation=(0 0 0)
      PhysicalOffsetFrame b15_offset: socket_parent=/bodyset/b15 translation=(-1 0 0)
    PinJoint j16: socket_parent_frame=b15_offset socket_child_frame=b16_offset
      Coordinate q16
      PhysicalOffsetFrame b15_offset: socket_parent=/bodyset/b15 translation=(0 0 0)
      PhysicalOffsetFrame b16_offset: socket_parent=/bodyset/b16 translation=(-1 0 0)
    PinJoint j17: socket_parent_frame=b16_offset socket_child_frame=b17_offset
      Coordinate q17
      PhysicalOffsetFrame b16_offset: socket_parent=/bodyset/b16 translation=(0 0 0)
      PhysicalOffsetFrame b17_offset: socket_parent=/bodyset/b17 translation=(-1 0 0)
    PinJoint j18: socket_parent_frame=b17_offset socket_child_frame=b18_offset
      Coordinate q18
      PhysicalOffsetFrame b17_offset: socket_parent=/bodyset/b17 translation=(0 0 0)
      PhysicalOffsetFrame b18_offset: socket_parent=/bodyset/b18 translation=(-1 0 0)
    PinJoint j19: socket_parent_frame=b18_offset socket_child_frame=b19_offset
      Coordinate q19
      PhysicalOffsetFrame b18_offset: socket_parent=/bodyset/b18 translation=(0 0 0)
      PhysicalOffsetFrame b19_offset: socket_parent=/bodyset/b19 translation=(-1 0 0)
  MarkerSet:
    Marker marker0: b0 (0 0 0)
    Marker marker1: b1 (0 0 0)
    Marker marker2: b2 (0 0 0)
    Marker marker3: b3 (0 0 0)
    Marker marker4: b4 (0 0 0)
    Marker marker5: b5 (0 0 0)
    Marker marker6: b6 (0 0 0)
    Marker marker7: b7 (0 0 0)
    Marker marker8: b8 (0 0 0)
    Marker marker9: b9 (0 0 0)
    Marker marker10: b10 (0 0 0)
    Marker marker11: b11 (0 0 0)
    Marker marker12: b12 (0 0 0)
    Marker marker13: b13 (0 0 0)
    Marker marker14: b14 (0 0 0)
    Marker marker15: b15 (0 0 0)
    Marker marker16: b16 (0 0 0)
    Marker marker17: b17 (0 0 0)
    Marker marker18: b18 (0 0 0)
    Marker marker19: b19 (0 0 0)
