# OpenSim document version 40600
Model 5_link_pendulum:
  CoordinateActuator tau0: coordinate=q0 optimal_force=1
  CoordinateActuator tau1: coordinate=q1 optimal_force=1
  CoordinateActuator tau2: coordinate=q2 optimal_force=1
  CoordinateActuator tau3: coordinate=q3 optimal_force=1
  CoordinateActuator tau4: coordinate=q4 optimal_force=1
  Ground
  BodySet:
    Body b0: mass=1 [kg] mass_center=(0 0 0) inertia=(1 1 1 0 0 0)
      PhysicalOffsetFrame b0center: socket_parent=.. translation=(-0.5 0 0) [meters]
        Ellipsoid b0center_geom_1: radii=(0.5 0.1 0.1)
    Body b1: mass=1 mass_center=(0 0 0) inertia=(1 1 1 0 0 0)
      PhysicalOffsetFrame b1center: socket_parent=.. translation=(-0.5 0 0)
        Ellipsoid b1center_geom_1: radii=(0.5 0.1 0.1)
    Body b2: mass=1 mass_center=(0 0 0) inertia=(1 1 1 0 0 0)
      PhysicalOffsetFrame b2center: socket_parent=.. translation=(-0.5 0 0)
        Ellipsoid b2center_geom_1: radii=(0.5 0.1 0.1)
    Body b3: mass=1 mass_center=(0 0 0) inertia=(1 1 1 0 0 0)
      PhysicalOffsetFrame b3center: socket_parent=.. translation=(-0.5 0 0)
        Ellipsoid b3center_geom_1: radii=(0.5 0.1 0.1)
    Body b4: mass=1 mass_center=(0 0 0) inertia=(1 1 1 0 0 0)
      PhysicalOffsetFrame b4center: socket_parent=.. translation=(-0.5 0 0)
        Ellipsoid b4center_geom_1: radii=(0.5 0.1 0.1)
  JointSet:
    PinJoint j0: socket_parent_frame=ground_offset socket_child_frame=b0_offset
      Coordinate q0
      PhysicalOffsetFrame ground_offset: socket_parent=/ground translation=(0 0 0)
      PhysicalOffsetFrame b0_offset: socket_parent=/bodyset/b0 translation=(-1 0 0)
    PinJoint j1: socket_parent_frame=b0_offset socket_child_frame=b1_offset
      Coordinate q1
      PhysicalOffsetFrame b0_offset: socket_parent=/bodyset/b0 translation=(0 0 0)
      PhysicalOffsetFrame b1_offset: socket_parent=/bodyset/b1 translation=(-1 0 0)
    PinJoint j2: socket_parent_frame=b1_offset socket_child_frame=b2_offset
      Coordinate q2
      PhysicalOffsetFrame b1_offset: socket_parent=/bodyset/b1 translation=(0 0 0)
      PhysicalOffsetFrame b2_offset: socket_parent=/bodyset/b2 translation=(-1 0 0)
    PinJoint j3: socket_parent_frame=b2_offset socket_child_frame=b3_offset
      Coordinate q3
      PhysicalOffsetFrame b2_offset: socket_parent=/bodyset/b2 translation=(0 0 0)
      PhysicalOffsetFrame b3_offset: socket_parent=/bodyset/b3 translation=(-1 0 0)
    PinJoint j4: socket_parent_frame=b3_offset socket_child_frame=b4_offset
      Coordinate q4
      PhysicalOffsetFrame b3_offset: socket_parent=/bodyset/b3 translation=(0 0 0)
      PhysicalOffsetFrame b4_offset: socket_parent=/bodyset/b4 translation=(-1 0 0)
  MarkerSet:
    Marker marker0: b0 (0 0 0)
    Marker marker1: b1 (0 0 0)
    Marker marker2: b2 (0 0 0)
    Marker marker3: b3 (0 0 0)
    Marker marker4: b4 (0 0 0)
