# OpenSim document version 40600
Model subject_walk_scaled:
  gravity: 0 -9.80665 0
  length_units: meters
  force_units: N
  credits:
    Rajagopal et al. (2016), Lai et al. (2017), Uhlrich et al. (2022)
  publications:
    Rajagopal, A., Dembia, C.L., DeMers, M.S., Delp, D.D., Hicks, J.L., Delp, S.L. (2016) Full-body musculoskeletal model for muscle-driven simulation of human gait. IEEE Transactions on Biomedical Engineering.
  Ground
  BodySet:
    Body pelvis: mass=13.33838 [kg] mass_center=(-0.0707 0 0) inertia=(0.1164291 0.09864762 0.06557631 0 0 0)
        meshes=(r_pelvis.vtp l_pelvis.vtp sacrum.vtp)
      WrapCylinder Gmax1_at_pelvis_r: xyz_body_rotation=(-0.6 0.45 0) translation=(-0.08857502 -0.1119129 0.06597336)
          quadrant=-x radius=0.04511135 length=0.1661361
      WrapCylinder Gmax2_at_pelvis_r: xyz_body_rotation=(-0.75 0.39 0) translation=(-0.09202599 -0.09382595 0.07354408)
          quadrant=all radius=0.04503595 length=0.1111259
      WrapCylinder Gmax3_at_pelvis_r: xyz_body_rotation=(-0.1 0 0) translation=(-0.09547697 -0.09947812 0.07354408)
          quadrant=all radius=0.04560562 length=0.1082029
      WrapCylinder Gmax1_at_pelvis_l: xyz_body_rotation=(0.6 -0.45 0) translation=(-0.08857502 -0.1119129 -0.06597336)
          quadrant=-x radius=0.04511135 length=0.1661361
      WrapCylinder Gmax2_at_pelvis_l: xyz_body_rotation=(0.75 -0.39 0)
          translation=(-0.09202599 -0.09382595 -0.07354408) quadrant=all radius=0.04503595 length=0.1111259
      WrapCylinder Gmax3_at_pelvis_l: xyz_body_rotation=(0.1 0 0) translation=(-0.09547697 -0.09947812 -0.07354408)
          quadrant=all radius=0.04560562 length=0.1082029
      WrapCylinder PS_at_brim_r: xyz_body_rotation=(-0.25 -0.27 0.1) translation=(-0.08512404 -0.06782599 0.07094841)
          quadrant=-y radius=0.05683166 length=0.1089395
      WrapCylinder PS_at_brim_l: xyz_body_rotation=(0.25 0.27 0.1) translation=(-0.08512404 -0.06782599 -0.07094841)
          quadrant=-y radius=0.05683166 length=0.1089395
      WrapCylinder IL_at_brim_r: xyz_body_rotation=(-0.32 -0.24 0.9) translation=(-0.08167307 -0.07347816 0.08176371)
          quadrant=-y radius=0.06238281 length=0.1090176
      WrapCylinder IL_at_brim_l: xyz_body_rotation=(0.32 0.24 0.9) translation=(-0.08167307 -0.07347816 -0.08176371)
          quadrant=-y radius=0.06238281 length=0.1090176
    Body femur_r: mass=10.53457 mass_center=(0 -0.17 0) inertia=(0.1516523 0.03975352 0.1599201 0 0 0)
        meshes=r_femur.vtp
      WrapCylinder GasLat_at_condyles_r: translation=(0.005243464 -0.3992165 0) quadrant=all radius=0.02629109
          length=0.1052276
      WrapCylinder GasMed_at_condyles_r: translation=(0.005243464 -0.3992165 0) quadrant=all radius=0.0252799
          length=0.1052276
      WrapCylinder KnExt_at_fem_r: xyz_body_rotation=(-0.0623366 0.0507601 0)
          translation=(0.003763004 -0.3921396 0.002200426) quadrant=all radius=0.02528397 length=0.1051974
      WrapCylinder KnExtVL_at_fem_r: xyz_body_rotation=(-0.0623366 0.0507601 0)
          translation=(0.001980226 -0.3921396 0.002200426) quadrant=all radius=0.02528397 length=0.1051974
      WrapCylinder AB_at_femshaft_r: xyz_body_rotation=(1.66157 0.186644 0)
          translation=(0.01535643 -0.1096336 0.02458644) quadrant=all radius=0.01730748 length=0.06839164
      WrapCylinder AL_at_femshaft_r: xyz_body_rotation=(1.77711 0.136489 0)
          translation=(0.03222916 -0.2258095 0.01590379) quadrant=all radius=0.02106992 length=0.09784959
      WrapCylinder AMprox_at_femshaft_r: xyz_body_rotation=(1.61126 0.18656 0)
          translation=(0.005435365 -0.07097758 0.02673098) quadrant=all radius=0.02213769 length=0.06835523
      WrapCylinder AMmid_at_femshaft_r: xyz_body_rotation=(1.61139 0.13656 0)
          translation=(0.02413305 -0.1564841 0.02166027) quadrant=all radius=0.02246471 length=0.1170328
      WrapCylinder AMdist_at_femshaft_r: xyz_body_rotation=(1.71188 0.186636 0)
          translation=(0.03314551 -0.2538783 0.009854148) quadrant=all radius=0.02285764 length=0.1955864
      WrapCylinder AMisch_at_condyles_r: xyz_body_rotation=(1.71115 -0.463363 0)
          translation=(-0.02375405 -0.3669199 -0.003319269) quadrant=all radius=0.04170484 length=0.2376947
      WrapCylinder PECT_at_femshaft_r: xyz_body_rotation=(1.81295 0.276344 0)
          translation=(0.006382062 -0.08228037 0.03203182) quadrant=all radius=0.01568655 length=0.04918974
    Body tibia_r: mass=4.199036 mass_center=(0 -0.1867 0) inertia=(0.05708197 0.005776152 0.05787478 0 0 0)
        meshes=(r_tibia.vtp r_fibula.vtp)
      WrapCylinder GasLat_at_shank_r: xyz_body_rotation=(2.96723 -0.279725 -1.47812)
          translation=(-0.008609964 -0.08605724 -0.003746227) quadrant=-y radius=0.06389765 length=0.113818
      WrapCylinder GasMed_at_shank_r: xyz_body_rotation=(2.96723 0.0279725 -1.47812)
          translation=(-0.008609964 -0.08605724 -0.003746227) quadrant=-y radius=0.06860516 length=0.1136086
      WrapCylinder GR_at_condyles_r: xyz_body_rotation=(0 -0.4 0) translation=(-0.003490526 -0.02325871 0) quadrant=all
          radius=0.04179958 length=0.1139555
      WrapCylinder SM_at_condyles_r: xyz_body_rotation=(0 -0.1 0) translation=(-0.001163509 -0.02325871 0) quadrant=all
          radius=0.04012636 length=0.1135506
      WrapCylinder ST_at_condyles_r: xyz_body_rotation=(0 -0.2 0) translation=(-0.002327017 -0.02384018 0) quadrant=all
          radius=0.04941349 length=0.113635
      WrapCylinder BF_at_gastroc_r: translation=(-0.04537684 -0.06977614 0) quadrant=y radius=0.03373344
          length=0.1702831
    Body patella_r: mass=0.07000713 mass_center=(0.0018 0.0264 0) inertia=(2.330864e-6 1.064726e-5 1.064726e-5 0 0 0)
        meshes=r_patella.vtp
    Body talus_r: mass=0.1132579 mass_center=(0 0 0) inertia=(0.001132579 0.001132579 0.001132579 0 0 0)
        meshes=r_talus.vtp
    Body calcn_r: mass=1.415724 mass_center=(0.1 0.03 0) inertia=(0.00158561 0.004417057 0.004643573 0 0 0)
        meshes=r_foot.vtp
    Body toes_r: mass=0.2453166 mass_center=(0.0346 0.006 -0.0175)
        inertia=(0.0007140909 0.0008273488 0.001132579 0 0 0) meshes=r_bofoot.vtp
    Body femur_l: mass=10.53457 mass_center=(0 -0.17 0) inertia=(0.1516523 0.03975352 0.1599201 0 0 0)
        meshes=l_femur.vtp
      WrapCylinder GasLat_at_condyles_l: translation=(0.005243464 -0.3992165 0) quadrant=all radius=0.02629109
          length=0.1052276
      WrapCylinder GasMed_at_condyles_l: translation=(0.005243464 -0.3992165 0) quadrant=all radius=0.0252799
          length=0.1052276
      WrapCylinder KnExt_at_fem_l: xyz_body_rotation=(0.0623366 -0.0507601 0)
          translation=(0.003763004 -0.3921396 -0.002200426) quadrant=all radius=0.02528397 length=0.1051974
      WrapCylinder KnExtVL_at_fem_l: xyz_body_rotation=(0.0623366 -0.0507601 0)
          translation=(0.001980226 -0.3921396 -0.002200426) quadrant=all radius=0.02528397 length=0.1051974
      WrapCylinder AB_at_femshaft_l: xyz_body_rotation=(-1.66157 -0.186644 0)
          translation=(0.01535643 -0.1096336 -0.02458644) quadrant=all radius=0.01730748 length=0.06839164
      WrapCylinder AL_at_femshaft_l: xyz_body_rotation=(-1.77711 -0.136489 0)
          translation=(0.03222916 -0.2258095 -0.01590379) quadrant=all radius=0.02106992 length=0.09784959
      WrapCylinder AMprox_at_femshaft_l: xyz_body_rotation=(-1.61126 -0.18656 0)
          translation=(0.005435365 -0.07097758 -0.02673098) quadrant=all radius=0.02213769 length=0.06835523
      WrapCylinder AMmid_at_femshaft_l: xyz_body_rotation=(-1.61139 -0.13656 0)
          translation=(0.02413305 -0.1564841 -0.02166027) quadrant=all radius=0.02246471 length=0.1170328
      WrapCylinder AMdist_at_femshaft_l: xyz_body_rotation=(-1.71188 -0.186636 0)
          translation=(0.03314551 -0.2538783 -0.009854148) quadrant=all radius=0.02285764 length=0.1955864
      WrapCylinder AMisch_at_condyles_l: xyz_body_rotation=(-1.71115 0.463363 0)
          translation=(-0.02375405 -0.3669199 0.003319269) quadrant=all radius=0.04170484 length=0.2376947
      WrapCylinder PECT_at_femshaft_l: xyz_body_rotation=(-1.81295 -0.276344 0)
          translation=(0.006382062 -0.08228037 -0.03203182) quadrant=all radius=0.01568655 length=0.04918974
    Body tibia_l: mass=4.199036 mass_center=(0 -0.1867 0) inertia=(0.05708197 0.005776152 0.05787478 0 0 0)
        meshes=(l_tibia.vtp l_fibula.vtp)
      WrapCylinder GasLat_at_shank_l: xyz_body_rotation=(-2.96723 0.279725 -1.47812)
          translation=(-0.008609964 -0.08605724 0.003746227) quadrant=-y radius=0.06389765 length=0.113818
      WrapCylinder GasMed_at_shank_l: xyz_body_rotation=(-2.96723 -0.0279725 -1.47812)
          translation=(-0.008609964 -0.08605724 0.003746227) quadrant=-y radius=0.06860516 length=0.1136086
      WrapCylinder GR_at_condyles_l: xyz_body_rotation=(0 0.4 0) translation=(-0.003490526 -0.02325871 0) quadrant=all
          radius=0.04179958 length=0.1139555
      WrapCylinder SM_at_condyles_l: xyz_body_rotation=(0 0.1 0) translation=(-0.001163509 -0.02325871 0) quadrant=all
          radius=0.04012636 length=0.1135506
      WrapCylinder ST_at_condyles_l: xyz_body_rotation=(0 0.2 0) translation=(-0.002327017 -0.02384018 0) quadrant=all
          radius=0.04941349 length=0.113635
      WrapCylinder BF_at_gastroc_l: translation=(-0.04537684 -0.06977614 0) quadrant=all radius=0.03373344
          length=0.1702831
    Body patella_l: mass=0.07000713 mass_center=(0.0018 0.0264 0) inertia=(2.330864e-6 1.064726e-5 1.064726e-5 0 0 0)
        meshes=l_patella.vtp
    Body talus_l: mass=0.1132579 mass_center=(0 0 0) inertia=(0.001132579 0.001132579 0.001132579 0 0 0)
        meshes=l_talus.vtp
    Body calcn_l: mass=1.415724 mass_center=(0.1 0.03 0) inertia=(0.00158561 0.004417057 0.004643573 0 0 0)
        meshes=l_foot.vtp
    Body toes_l: mass=0.2453166 mass_center=(0.0346 0.006 -0.0175)
        inertia=(0.0007140909 0.0008273488 0.001132579 0 0 0) meshes=l_bofoot.vtp
    Body torso: mass=30.38324 mass_center=(-0.03 0.32 0) inertia=(1.669987 0.8556633 1.621173 0 0 0)
        meshes=(hat_spine.vtp hat_jaw.vtp hat_skull.vtp hat_ribs_scap.vtp)
    Body humerus_r: mass=2.301966 mass_center=(0 -0.164502 0) inertia=(0.01352979 0.004667357 0.01518675 0 0 0)
        meshes=humerus_rv.vtp
    Body ulna_r: mass=0.6880416 mass_center=(0 -0.120525 0) inertia=(0.003354698 0.0006999337 0.003638976 0 0 0)
        meshes=ulna_rv.vtp
    Body radius_r: mass=0.6880416 mass_center=(0 -0.120525 0) inertia=(0.003354698 0.0006999337 0.003638976 0 0 0)
        meshes=radius_rv.vtp
    Body hand_r: mass=0.5181548 mass_center=(0 -0.068095 0) inertia=(0.00101026 0.0006195206 0.001517656 0 0 0)
        meshes=(pisiform_rvs.vtp lunate_rvs.vtp scaphoid_rvs.vtp triquetrum_rvs.vtp hamate_rvs.vtp capitate_rvs.vtp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)
    Body humerus_l: mass=2.301966 mass_center=(0 -0.164502 0) inertia=(0.01352979 0.004667357 0.01518675 0 0 0)
        meshes=humerus_lv.vtp
    Body ulna_l: mass=0.6880416 mass_center=(0 -0.120525 0) inertia=(0.003354698 0.0006999337 0.003638976 0 0 0)
        meshes=ulna_lv.vtp
    Body radius_l: mass=0.6880416 mass_center=(0 -0.120525 0) inertia=(0.003354698 0.0006999337 0.003638976 0 0 0)
        meshes=radius_lv.vtp
    Body hand_l: mass=0.5181548 mass_center=(0 -0.068095 0) inertia=(0.00101026 0.0006195206 0.001517656 0 0 0)
        meshes=(pisiform_lvs.vtp lunate_lvs.vtp scaphoid_lvs.vtp triquetrum_lvs.vtp hamate_lvs.vtp capitate_lvs.vtp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)
  JointSet:
    CustomJoint ground_pelvis: socket_parent_frame=ground_offset socket_child_frame=pelvis_offset
      Coordinate pelvis_tilt: default_value=0 range=(-3.141593 3.141593) clamped=true
      Coordinate pelvis_list: default_value=0 range=(-3.141593 3.141593) clamped=true
      Coordinate pelvis_rotation: default_value=0 range=(-3.141593 3.141593) clamped=true
      Coordinate pelvis_tx: default_value=0 range=(-50 50) clamped=true
      Coordinate pelvis_ty: default_value=0.93 range=(-1 2) clamped=true
      Coordinate pelvis_tz: default_value=0 range=(-3 3) clamped=true
      PhysicalOffsetFrame ground_offset: socket_parent=/ground translation=(0 0 0) [meters]
      PhysicalOffsetFrame pelvis_offset: socket_parent=/bodyset/pelvis translation=(0 0 0)
      SpatialTransform:
        TransformAxis rotation1: coordinates=pelvis_tilt axis=(0 0 1) LinearFunction(coefficients=1 0)
        TransformAxis rotation2: coordinates=pelvis_list axis=(1 0 0) LinearFunction(coefficients=1 0)
        TransformAxis rotation3: coordinates=pelvis_rotation axis=(0 1 0) LinearFunction(coefficients=1 0)
        TransformAxis translation1: coordinates=pelvis_tx axis=(1 0 0) LinearFunction(coefficients=1 0)
        TransformAxis translation2: coordinates=pelvis_ty axis=(0 1 0) LinearFunction(coefficients=1 0)
        TransformAxis translation3: coordinates=pelvis_tz axis=(0 0 1) LinearFunction(coefficients=1 0)
    CustomJoint hip_r: socket_parent_frame=pelvis_offset socket_child_frame=femur_r_offset
      Coordinate hip_flexion_r: default_value=0 range=(-0.5235988 2.094395) clamped=true
      Coordinate hip_adduction_r: default_value=0 range=(-0.8726646 0.5235988) clamped=true
      Coordinate hip_rotation_r: default_value=0 range=(-0.6981317 0.6981317) clamped=true
      PhysicalOffsetFrame pelvis_offset: socket_parent=/bodyset/pelvis translation=(-0.06473568 -0.0887277 0.08355905)
      PhysicalOffsetFrame femur_r_offset: socket_parent=/bodyset/femur_r translation=(0 0 0)
      SpatialTransform: axes_held_at_zero=(translation1 translation2 translation3)
        TransformAxis rotation1: coordinates=hip_flexion_r axis=(0 0 1) LinearFunction(coefficients=1 0)
        TransformAxis rotation2: coordinates=hip_adduction_r axis=(1 0 0) LinearFunction(coefficients=1 0)
        TransformAxis rotation3: coordinates=hip_rotation_r axis=(0 1 0) LinearFunction(coefficients=1 0)
    CustomJoint walker_knee_r: socket_parent_frame=femur_r_offset socket_child_frame=tibia_r_offset
      Coordinate knee_angle_r: default_value=0 range=(0 2.443461) clamped=true
      PhysicalOffsetFrame femur_r_offset: socket_parent=/bodyset/femur_r
          translation=(-0.00473105 -0.398853 -0.001838678) orientation=(-1.64157 1.44618 1.5708) [radians]
      PhysicalOffsetFrame tibia_r_offset: socket_parent=/bodyset/tibia_r
          translation=(-0.009412249 -0.004110745 -0.001685507) orientation=(-1.64157 1.44618 1.5708)
      SpatialTransform:
        TransformAxis rotation1: coordinates=knee_angle_r axis=(1 0 0) LinearFunction(coefficients=1 0)
        TransformAxis rotation2: coordinates=knee_angle_r axis=(0 0 1)
          PolynomialFunction: coefficients=(0.01083209 -0.02521833 -0.03284781 0.07910001 -1.47e-8)
        TransformAxis rotation3: coordinates=knee_angle_r axis=(0 1 0)
          PolynomialFunction: coefficients=(0.02516576 -0.1694801 0.3694993 -4.43e-8)
        TransformAxis translation1: coordinates=knee_angle_r axis=(1 0 0)
          MultiplierFunction: scale=1.048693
            PolynomialFunction: coefficients=(0.0001590448 -0.00101515 0.001817511 2.64143e-5 0)
        TransformAxis translation2: coordinates=knee_angle_r axis=(0 1 0)
          MultiplierFunction: scale=0.9736987
            PolynomialFunction: coefficients=(-0.0005796878 0.005079766 -0.01144238 0.003936909 0)
        TransformAxis translation3: coordinates=knee_angle_r axis=(0 0 1)
          MultiplierFunction: scale=1.052276
            PolynomialFunction: coefficients=(0.001208087 -0.004453611 0.0006116494 0.00626543 0)
    CustomJoint patellofemoral_r: socket_parent_frame=femur_r_offset socket_child_frame=patella_r_offset
      Coordinate knee_angle_r_beta: default_value=0 range=(-10 10) clamped=false
      PhysicalOffsetFrame femur_r_offset: socket_parent=/bodyset/femur_r
          translation=(-0.008483926 -0.3972301 -0.00289376)
      PhysicalOffsetFrame patella_r_offset: socket_parent=/bodyset/patella_r translation=(0 0 0)
      SpatialTransform: axes_held_at_zero=(rotation2 rotation3)
        TransformAxis rotation1: coordinates=knee_angle_r_beta axis=(0 0 1)
          SimmSpline: x=(0 0.174533 0.349066 0.523599 0.698132 0.872665 1.0472 1.22173 1.39626 1.5708 1.74533 1.91986 2.0944)
              y=(0.00113686 -0.00629212 -0.105582 -0.253683 -0.414245 -0.579047 -0.747244 -0.91799 -1.09044 -1.26379 -1.43763 -1.61186 -1.78634)
        TransformAxis translation1: coordinates=knee_angle_r_beta axis=(1 0 0)
          MultiplierFunction: scale=1.048693
            SimmSpline: x=(0 0.174533 0.349066 0.523599 0.698132 0.872665 1.0472 1.22173 1.39626 1.5708 1.74533 1.91986 2.0944)
                y=(0.0524 0.0488 0.0437 0.0371 0.0296 0.0216 0.0136 0.0057 -0.0019 -0.0088 -0.0148 -0.0196 -0.0227)
        TransformAxis translation2: coordinates=knee_angle_r_beta axis=(0 1 0)
          MultiplierFunction: scale=0.9736987
            SimmSpline: x=(0 0.174533 0.349066 0.523599 0.698132 0.872665 1.0472 1.22173 1.39626 1.5708 1.74533 1.91986 2.0944)
                y=(-0.0108 -0.019 -0.0263 -0.0322 -0.0367 -0.0395 -0.0408 -0.0404 -0.0384 -0.0349 -0.0301 -0.0245 -0.0187)
        TransformAxis translation3: axis=(0 0 1) MultiplierFunction(scale=1.052276, Constant(value=0.00275))
    PinJoint ankle_r: socket_parent_frame=tibia_r_offset socket_child_frame=talus_r_offset
      Coordinate ankle_angle_r: default_value=0 range=(-0.8726646 0.8726646) clamped=true
      PhysicalOffsetFrame tibia_r_offset: socket_parent=/bodyset/tibia_r translation=(-0.01163509 -0.4651743 0)
          orientation=(0.175895 -0.105208 0.0186622)
      PhysicalOffsetFrame talus_r_offset: socket_parent=/bodyset/talus_r translation=(0 0 0)
          orientation=(0.175895 -0.105208 0.0186622)
    CustomJoint hip_l: socket_parent_frame=pelvis_offset socket_child_frame=femur_l_offset
      Coordinate hip_flexion_l: default_value=0 range=(-0.5235988 2.094395) clamped=true
      Coordinate hip_adduction_l: default_value=0 range=(-0.8726646 0.5235988) clamped=true
      Coordinate hip_rotation_l: default_value=0 range=(-0.6981317 0.6981317) clamped=true
      PhysicalOffsetFrame pelvis_offset: socket_parent=/bodyset/pelvis translation=(-0.06473568 -0.0887277 -0.08355905)
      PhysicalOffsetFrame femur_l_offset: socket_parent=/bodyset/femur_l translation=(0 0 0)
      SpatialTransform: axes_held_at_zero=(translation1 translation2 translation3)
        TransformAxis rotation1: coordinates=hip_flexion_l axis=(0 0 1) LinearFunction(coefficients=1 0)
        TransformAxis rotation2: coordinates=hip_adduction_l axis=(1 0 0) LinearFunction(coefficients=-1 0)
        TransformAxis rotation3: coordinates=hip_rotation_l axis=(0 1 0) LinearFunction(coefficients=-1 0)
    CustomJoint walker_knee_l: socket_parent_frame=femur_l_offset socket_child_frame=tibia_l_offset
      Coordinate knee_angle_l: default_value=0 range=(0 2.443461) clamped=true
      PhysicalOffsetFrame femur_l_offset: socket_parent=/bodyset/femur_l
          translation=(-0.00473105 -0.398853 0.001838678) orientation=(1.64157 -1.44618 1.5708)
      PhysicalOffsetFrame tibia_l_offset: socket_parent=/bodyset/tibia_l
          translation=(-0.009412249 -0.004110745 0.001685507) orientation=(1.64157 -1.44618 1.5708)
      SpatialTransform:
        TransformAxis rotation1: coordinates=knee_angle_l axis=(-1 0 0) LinearFunction(coefficients=1 0)
        TransformAxis rotation2: coordinates=knee_angle_l axis=(0 0 1)
          PolynomialFunction: coefficients=(0.01083209 -0.02521833 -0.03284781 0.07910001 -1.47e-8)
        TransformAxis rotation3: coordinates=knee_angle_l axis=(0 1 0)
          PolynomialFunction: coefficients=(-0.02516576 0.1694801 -0.3694993 4.43e-8)
        TransformAxis translation1: coordinates=knee_angle_l axis=(1 0 0)
          MultiplierFunction: scale=1.048693
            PolynomialFunction: coefficients=(0.0001590448 -0.00101515 0.001817511 2.64143e-5 0)
        TransformAxis translation2: coordinates=knee_angle_l axis=(0 1 0)
          MultiplierFunction: scale=0.9736987
            PolynomialFunction: coefficients=(-0.0005796878 0.005079766 -0.01144238 0.003936909 0)
        TransformAxis translation3: coordinates=knee_angle_l axis=(0 0 1)
          MultiplierFunction: scale=1.052276
            PolynomialFunction: coefficients=(-0.001208087 0.004453611 -0.0006116494 -0.00626543 0)
    CustomJoint patellofemoral_l: socket_parent_frame=femur_l_offset socket_child_frame=patella_l_offset
      Coordinate knee_angle_l_beta: default_value=0 range=(-10 10) clamped=false
      PhysicalOffsetFrame femur_l_offset: socket_parent=/bodyset/femur_l
          translation=(-0.008483926 -0.3972301 0.00289376)
      PhysicalOffsetFrame patella_l_offset: socket_parent=/bodyset/patella_l translation=(0 0 0)
      SpatialTransform: axes_held_at_zero=(rotation2 rotation3)
        TransformAxis rotation1: coordinates=knee_angle_l_beta axis=(0 0 1)
          SimmSpline: x=(0 0.174533 0.349066 0.523599 0.698132 0.872665 1.0472 1.22173 1.39626 1.5708 1.74533 1.91986 2.0944)
              y=(0.00113686 -0.00629212 -0.105582 -0.253683 -0.414245 -0.579047 -0.747244 -0.91799 -1.09044 -1.26379 -1.43763 -1.61186 -1.78634)
        TransformAxis translation1: coordinates=knee_angle_l_beta axis=(1 0 0)
          MultiplierFunction: scale=1.048693
            SimmSpline: x=(0 0.174533 0.349066 0.523599 0.698132 0.872665 1.0472 1.22173 1.39626 1.5708 1.74533 1.91986 2.0944)
                y=(0.0524 0.0488 0.0437 0.0371 0.0296 0.0216 0.0136 0.0057 -0.0019 -0.0088 -0.0148 -0.0196 -0.0227)
        TransformAxis translation2: coordinates=knee_angle_l_beta axis=(0 1 0)
          MultiplierFunction: scale=0.9736987
            SimmSpline: x=(0 0.174533 0.349066 0.523599 0.698132 0.872665 1.0472 1.22173 1.39626 1.5708 1.74533 1.91986 2.0944)
                y=(-0.0108 -0.019 -0.0263 -0.0322 -0.0367 -0.0395 -0.0408 -0.0404 -0.0384 -0.0349 -0.0301 -0.0245 -0.0187)
        TransformAxis translation3: axis=(0 0 1) MultiplierFunction(scale=1.052276, Constant(value=-0.00275))
    PinJoint ankle_l: socket_parent_frame=tibia_l_offset socket_child_frame=talus_l_offset
      Coordinate ankle_angle_l: default_value=0 range=(-0.8726646 0.8726646) clamped=true
      PhysicalOffsetFrame tibia_l_offset: socket_parent=/bodyset/tibia_l translation=(-0.01163509 -0.4651743 0)
          orientation=(-0.175895 0.105208 0.0186622)
      PhysicalOffsetFrame talus_l_offset: socket_parent=/bodyset/talus_l translation=(0 0 0)
          orientation=(-0.175895 0.105208 0.0186622)
    CustomJoint back: socket_parent_frame=pelvis_offset socket_child_frame=torso_offset
      Coordinate lumbar_extension: default_value=0 range=(-1.570796 1.570796) clamped=true
      Coordinate lumbar_bending: default_value=0 range=(-1.570796 1.570796) clamped=true
      Coordinate lumbar_rotation: default_value=0 range=(-1.570796 1.570796) clamped=true
      PhysicalOffsetFrame pelvis_offset: socket_parent=/bodyset/pelvis translation=(-0.1158377 0.0921303 0)
      PhysicalOffsetFrame torso_offset: socket_parent=/bodyset/torso translation=(0 0 0)
      SpatialTransform: axes_held_at_zero=(translation1 translation2 translation3)
        TransformAxis rotation1: coordinates=lumbar_extension axis=(0 0 1) LinearFunction(coefficients=1 0)
        TransformAxis rotation2: coordinates=lumbar_bending axis=(1 0 0) LinearFunction(coefficients=1 0)
        TransformAxis rotation3: coordinates=lumbar_rotation axis=(0 1 0) LinearFunction(coefficients=1 0)
    CustomJoint acromial_r: socket_parent_frame=torso_offset socket_child_frame=humerus_r_offset
      Coordinate arm_flex_r: default_value=0 range=(-10 10) clamped=true
      Coordinate arm_add_r: default_value=0 range=(-10 10) clamped=true
      Coordinate arm_rot_r: default_value=0 range=(-10 10) clamped=true
      PhysicalOffsetFrame torso_offset: socket_parent=/bodyset/torso translation=(0.004086704 0.3851523 0.198768)
      PhysicalOffsetFrame humerus_r_offset: socket_parent=/bodyset/humerus_r translation=(0 0 0)
      SpatialTransform: axes_held_at_zero=(translation1 translation2 translation3)
        TransformAxis rotation1: coordinates=arm_flex_r axis=(0 0 1) LinearFunction(coefficients=1 0)
        TransformAxis rotation2: coordinates=arm_add_r axis=(1 0 0) LinearFunction(coefficients=1 0)
        TransformAxis rotation3: coordinates=arm_rot_r axis=(0 1 0) LinearFunction(coefficients=1 0)
    PinJoint elbow_r: socket_parent_frame=humerus_r_offset socket_child_frame=ulna_r_offset
      Coordinate elbow_flex_r: default_value=0 range=(0 2.618) clamped=true
      PhysicalOffsetFrame humerus_r_offset: socket_parent=/bodyset/humerus_r
          translation=(0.01436782 -0.3200092 -0.009935782) orientation=(-0.0228627 0.228018 0.0051689)
      PhysicalOffsetFrame ulna_r_offset: socket_parent=/bodyset/ulna_r translation=(0 0 0)
          orientation=(-0.0228627 0.228018 0.0051689)
    PinJoint radioulnar_r: socket_parent_frame=ulna_r_offset socket_child_frame=radius_r_offset
      Coordinate pro_sup_r: default_value=0 range=(0 2.09) clamped=true
      PhysicalOffsetFrame ulna_r_offset: socket_parent=/bodyset/ulna_r
          translation=(-0.007193475 -0.01302109 0.02847468) orientation=(-1.56884 0.056428 1.53614)
      PhysicalOffsetFrame radius_r_offset: socket_parent=/bodyset/radius_r translation=(0 0 0)
          orientation=(-1.56884 0.056428 1.53614)
    WeldJoint radius_hand_r: socket_parent_frame=radius_r_offset socket_child_frame=hand_r_offset
      PhysicalOffsetFrame radius_r_offset: socket_parent=/bodyset/radius_r
          translation=(-0.009407016 -0.2360965 0.01485797) orientation=(-1.5708 0 -1.5708)
      PhysicalOffsetFrame hand_r_offset: socket_parent=/bodyset/hand_r translation=(0 0 0)
          orientation=(-1.5708 0 -1.5708)
    CustomJoint acromial_l: socket_parent_frame=torso_offset socket_child_frame=humerus_l_offset
      Coordinate arm_flex_l: default_value=0 range=(-10 10) clamped=true
      Coordinate arm_add_l: default_value=0 range=(-10 10) clamped=true
      Coordinate arm_rot_l: default_value=0 range=(-10 10) clamped=true
      PhysicalOffsetFrame torso_offset: socket_parent=/bodyset/torso translation=(0.004086704 0.3851523 -0.198768)
      PhysicalOffsetFrame humerus_l_offset: socket_parent=/bodyset/humerus_l translation=(0 0 0)
      SpatialTransform: axes_held_at_zero=(translation1 translation2 translation3)
        TransformAxis rotation1: coordinates=arm_flex_l axis=(0 0 1) LinearFunction(coefficients=1 0)
        TransformAxis rotation2: coordinates=arm_add_l axis=(-1 0 0) LinearFunction(coefficients=1 0)
        TransformAxis rotation3: coordinates=arm_rot_l axis=(0 -1 0) LinearFunction(coefficients=1 0)
    PinJoint elbow_l: socket_parent_frame=humerus_l_offset socket_child_frame=ulna_l_offset
      Coordinate elbow_flex_l: default_value=0 range=(0 2.618) clamped=true
      PhysicalOffsetFrame humerus_l_offset: socket_parent=/bodyset/humerus_l
          translation=(0.01436782 -0.3200092 0.009935782) orientation=(0.0228627 -0.228018 0.0051689)
      PhysicalOffsetFrame ulna_l_offset: socket_parent=/bodyset/ulna_l translation=(0 0 0)
          orientation=(0.0228627 -0.228018 0.0051689)
    PinJoint radioulnar_l: socket_parent_frame=ulna_l_offset socket_child_frame=radius_l_offset
      Coordinate pro_sup_l: default_value=0 range=(0 2.09) clamped=true
      PhysicalOffsetFrame ulna_l_offset: socket_parent=/bodyset/ulna_l
          translation=(-0.007193475 -0.01302109 -0.02847468) orientation=(1.56884 -0.056428 1.53614)
      PhysicalOffsetFrame radius_l_offset: socket_parent=/bodyset/radius_l translation=(0 0 0)
          orientation=(1.56884 -0.056428 1.53614)
    WeldJoint radius_hand_l: socket_parent_frame=radius_l_offset socket_child_frame=hand_l_offset
      PhysicalOffsetFrame radius_l_offset: socket_parent=/bodyset/radius_l
          translation=(-0.009407016 -0.2360965 -0.01485797) orientation=(1.5708 0 1.5708)
      PhysicalOffsetFrame hand_l_offset: socket_parent=/bodyset/hand_l translation=(0 0 0)
          orientation=(1.5708 0 1.5708)
    WeldJoint subtalar_r: socket_parent_frame=talus_r_offset socket_child_frame=calcn_r_offset
      PhysicalOffsetFrame talus_r_offset: socket_parent=/bodyset/talus_r
          translation=(-0.05989745 -0.05629063 0.01019297) orientation=(-1.76819 0.906223 1.8196)
      PhysicalOffsetFrame calcn_r_offset: socket_parent=/bodyset/calcn_r translation=(0 0 0)
          orientation=(-1.76819 0.906223 1.8196)
    PinJoint mtp_r: socket_parent_frame=calcn_r_offset socket_child_frame=toes_r_offset
      Coordinate mtp_angle_r: default_value=0 range=(-0.5235988 0.5235988) clamped=true
      PhysicalOffsetFrame calcn_r_offset: socket_parent=/bodyset/calcn_r translation=(0.1788 -0.002 0.00108)
      PhysicalOffsetFrame toes_r_offset: socket_parent=/bodyset/toes_r translation=(0 0 0)
    WeldJoint subtalar_l: socket_parent_frame=talus_l_offset socket_child_frame=calcn_l_offset
      PhysicalOffsetFrame talus_l_offset: socket_parent=/bodyset/talus_l
          translation=(-0.05989745 -0.05629063 -0.01019297) orientation=(1.76819 -0.906223 1.8196)
      PhysicalOffsetFrame calcn_l_offset: socket_parent=/bodyset/calcn_l translation=(0 0 0)
          orientation=(1.76819 -0.906223 1.8196)
    PinJoint mtp_l: socket_parent_frame=calcn_l_offset socket_child_frame=toes_l_offset
      Coordinate mtp_angle_l: default_value=0 range=(-0.5235988 0.5235988) clamped=true
      PhysicalOffsetFrame calcn_l_offset: socket_parent=/bodyset/calcn_l translation=(0.1788 -0.002 -0.00108)
      PhysicalOffsetFrame toes_l_offset: socket_parent=/bodyset/toes_l translation=(0 0 0)
  ConstraintSet:
    CoordinateCouplerConstraint patellofemoral_knee_angle_r_con: independent_coordinate_names=knee_angle_r
        dependent_coordinate_name=knee_angle_r_beta scale_factor=1
        coupled_coordinates_function=LinearFunction(coefficients=1 0)
    CoordinateCouplerConstraint patellofemoral_knee_angle_l_con: independent_coordinate_names=knee_angle_l
        dependent_coordinate_name=knee_angle_l_beta scale_factor=1
        coupled_coordinates_function=LinearFunction(coefficients=1 0)
  ForceSet:
    CoordinateActuator [values shared by the 13 below unless stated]: min_control=-1 max_control=1 optimal_force=50
    CoordinateActuator lumbar_ext: coordinate=lumbar_extension
    CoordinateActuator lumbar_bend: coordinate=lumbar_bending
    CoordinateActuator lumbar_rot: coordinate=lumbar_rotation
    CoordinateActuator shoulder_flex_r: coordinate=arm_flex_r
    CoordinateActuator shoulder_add_r: coordinate=arm_add_r
    CoordinateActuator shoulder_rot_r: coordinate=arm_rot_r
    CoordinateActuator elbow_flex_r: coordinate=elbow_flex_r
    CoordinateActuator pro_sup_r: coordinate=pro_sup_r
    CoordinateActuator shoulder_flex_l: coordinate=arm_flex_l
    CoordinateActuator shoulder_add_l: coordinate=arm_add_l
    CoordinateActuator shoulder_rot_l: coordinate=arm_rot_l
    CoordinateActuator elbow_flex_l: coordinate=elbow_flex_l
    CoordinateActuator pro_sup_l: coordinate=pro_sup_l
    DeGrooteFregly2016Muscle [values shared by the 80 below unless stated]: min_control=0.01 max_control=1
        max_contraction_velocity=10 ignore_tendon_compliance=true activation_time_constant=0.01
        deactivation_time_constant=0.04 default_activation=0.01 fiber_damping=0.01
        passive_fiber_strain_at_one_norm_force=0.7 tendon_strain_at_one_norm_force=0.049
    DeGrooteFregly2016Muscle addbrev_r: max_isometric_force=625.8197 optimal_fiber_length=0.1047026
        tendon_slack_length=0.03600134 pennation_angle_at_optimal=0.1147809 [radians]
      FunctionBasedPath path: coordinate_paths=(/jointset/hip_r/hip_flexion_r /jointset/hip_r/hip_adduction_r /jointset/hip_r/hip_rotation_r)
        length_function: MultivariatePolynomialFunction: coefficients=(0.1424571 -0.004754645 -0.005055087 0 0 0 -0.05786407 -0.002683281 0 0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)
            dimension=3 order=5
    DeGrooteFregly2016Muscle addlong_r: max_isometric_force=916.8 optimal_fiber_length=0.1063869
        tendon_slack_length=0.1295908 pennation_angle_at_optimal=0.1377704
      FunctionBasedPath path: coordinate_paths=(/jointset/hip_r/hip_flexion_r /jointset/hip_r/hip_adduction_r /jointset/hip_r/hip_rotation_r)
        length_function: MultivariatePolynomialFunction: coefficients=(0.2400005 -0.005041852 0 0 0 0 -0.06260159 0 0 0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)
            dimension=3 order=5
    DeGrooteFregly2016Muscle addmagDist_r: max_isometric_force=597.2951 optimal_fiber_length=0.1682945
        tendon_slack_length=0.08298921 pennation_angle_at_optimal=0.194705
      FunctionBasedPath path: coordinate_paths=(/jointset/hip_r/hip_flexion_r /jointset/hip_r/hip_adduction_r /jointset/hip_r/hip_rotation_r)
        length_function: MultivariatePolynomialFunction: coefficients=(0.2117391 0 -0.002131847 0 0 0 -0.05404375 0 0 0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)
            dimension=3 order=5
    DeGrooteFregly2016Muscle addmagIsch_r: max_isometric_force=597.2951 optimal_fiber_length=0.1487795
        tendon_slack_length=0.2060653 pennation_angle_at_optimal=0.1680443
      FunctionBasedPath path: coordinate_paths=(/jointset/hip_r/hip_flexion_r /jointset/hip_r/hip_adduction_r /jointset/hip_r/hip_rotation_r)
        length_function: MultivariatePolynomialFunction: coefficients=(0.3235329 -0.005102586 0.001996255 0 0 0 -0.03774793 0 0 0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)
            dimension=3 order=5
    DeGrooteFregly2016Muscle addmagMid_r: max_isometric_force=597.2951 optimal_fiber_length=0.1330413
        tendon_slack_length=0.04505018 pennation_angle_at_optimal=0.2073076
      FunctionBasedPath path: coordinate_paths=(/jointset/hip_r/hip_flexion_r /jointset/hip_r/hip_adduction_r /jointset/hip_r/hip_rotation_r)
        length_function: MultivariatePolynomialFunction: coefficients=(0.1387795 0 -0.004135003 0 0 0 -0.07036068 0 0 0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)
            dimension=3 order=5
    DeGrooteFregly2016Muscle addmagProx_r: max_isometric_force=597.2951 optimal_fiber_length=0.1103272
        tendon_slack_length=0.0421292 pennation_angle_at_optimal=0.3114833
      FunctionBasedPath path: coordinate_paths=(/jointset/hip_r/hip_flexion_r /jointset/hip_r/hip_adduction_r /jointset/hip_r/hip_rotation_r)
        length_function: MultivariatePolynomialFunction: coefficients=(0.1216136 0.005455491 -0.007751947 0 0 0 -0.05286836 -0.00305555 0 0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)
            dimension=3 order=5
    DeGrooteFregly2016Muscle bflh_r: max_isometric_force=1313.184 optimal_fiber_length=0.0959815
        tendon_slack_length=0.3269845 pennation_angle_at_optimal=0.1759182
      FunctionBasedPath path: coordinate_paths=(/jointset/hip_r/hip_flexion_r /jointset/hip_r/hip_adduction_r /jointset/hip_r/hip_rotation_r /jointset/walker_knee_r/knee_angle_r)
        length_function: MultivariatePolynomialFunction: coefficients=(0.4146212 -0.03298343 0 -0.0005872127 0 0 0.00745676 0.001159374 0 0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)
            dimension=4 order=5
    DeGrooteFregly2016Muscle bfsh_r: max_isometric_force=557.1148 optimal_fiber_length=0.110411
        tendon_slack_length=0.1059237 pennation_angle_at_optimal=0.2642232
      FunctionBasedPath path: coordinate_paths=/jointset/walker_knee_r/knee_angle_r
        length_function: MultivariatePolynomialFunction: coefficients=(0.2302954 -0.02343199 0 -0.001478959 0 0)
            dimension=1 order=5
    DeGrooteFregly2016Muscle edl_r: max_isometric_force=603.4982 optimal_fiber_length=0.08121529
        tendon_slack_length=0.4322988 pennation_angle_at_optimal=0.2182582
      FunctionBasedPath path: coordinate_paths=/jointset/ankle_r/ankle_angle_r
        length_function: MultivariatePolynomialFunction: coefficients=(0.5124737 -0.03927 -0.004761183 0 0 0.004187692)
            dimension=1 order=5
    DeGrooteFregly2016Muscle ehl_r: max_isometric_force=285.8675 optimal_fiber_length=0.08793189
        tendon_slack_length=0.3841675 pennation_angle_at_optimal=0.1972681
      FunctionBasedPath path: coordinate_paths=/jointset/ankle_r/ankle_angle_r
        length_function: MultivariatePolynomialFunction: coefficients=(0.4755009 -0.04259308 -0.005717877 0.002853075 0 0)
            dimension=1 order=5
    DeGrooteFregly2016Muscle fdl_r: max_isometric_force=423.177 optimal_fiber_length=0.05268679
        tendon_slack_length=0.4474512 pennation_angle_at_optimal=0.2248391
      FunctionBasedPath path: coordinate_paths=/jointset/ankle_r/ankle_angle_r
        length_function: MultivariatePolynomialFunction: coefficients=(0.5008468 0.01132827 -0.007641844 0 0 0)
            dimension=1 order=5
    DeGrooteFregly2016Muscle fhl_r: max_isometric_force=907.8393 optimal_fiber_length=0.06211099
        tendon_slack_length=0.4176165 pennation_angle_at_optimal=0.2580255
      FunctionBasedPath path: coordinate_paths=/jointset/ankle_r/ankle_angle_r
        length_function: MultivariatePolynomialFunction: coefficients=(0.4770137 0.01796083 -0.008067338 0 0 0)
            dimension=1 order=5
    DeGrooteFregly2016Muscle gaslat_r: max_isometric_force=1575.059 optimal_fiber_length=0.08102791
        tendon_slack_length=0.4391948 pennation_angle_at_optimal=0.2102268
      FunctionBasedPath path: coordinate_paths=(/jointset/walker_knee_r/knee_angle_r /jointset/ankle_r/ankle_angle_r)
        length_function: MultivariatePolynomialFunction: coefficients=(0.5289559 0.05367163 -0.009727654 -0.007781267 0.001733451 -4.884474e-5 -0.02773708 -0.0001867873 0.0007752692 0.0004124451 -0.0005768874 0.01294818 -0.0009894606 -0.0001708201 -0.0002634805 -0.01413563 0.001400188 -2.332013e-5 0.005494625 -0.0004597006 -0.0007180927)
            dimension=2 order=5
    DeGrooteFregly2016Muscle gasmed_r: max_isometric_force=3115.515 optimal_fiber_length=0.07004822
        tendon_slack_length=0.4594688 pennation_angle_at_optimal=0.1656816
      FunctionBasedPath path: coordinate_paths=(/jointset/walker_knee_r/knee_angle_r /jointset/ankle_r/ankle_angle_r)
        length_function: MultivariatePolynomialFunction: coefficients=(0.5365857 0.0532191 -0.007551452 -0.007445185 0 0 -0.01253252 0 0 0 0 -0.007983034 0 0 0 0 0 0 0.0007074806 0 0)
            dimension=2 order=5
    DeGrooteFregly2016Muscle glmax1_r: max_isometric_force=983.7836 optimal_fiber_length=0.1598643
        tendon_slack_length=0.09493979 pennation_angle_at_optimal=0.3540118
      FunctionBasedPath path: coordinate_paths=(/jointset/hip_r/hip_flexion_r /jointset/hip_r/hip_adduction_r /jointset/hip_r/hip_rotation_r)
        length_function: MultivariatePolynomialFunction: coefficients=(0.2080002 0.0231113 0.01736276 -0.004958978 -0.0008603466 0.002608913 0.01973359 0.02102084 -0.01848329 0.006803718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)
            dimension=3 order=5
    DeGrooteFregly2016Muscle glmax2_r: max_isometric_force=1406.046 optimal_fiber_length=0.1674976
        tendon_slack_length=0.1162881 pennation_angle_at_optimal=0.3673821
      FunctionBasedPath path: coordinate_paths=(/jointset/hip_r/hip_flexion_r /jointset/hip_r/hip_adduction_r /jointset/hip_r/hip_rotation_r)
        length_function: MultivariatePolynomialFunction: coefficients=(0.2328241 0.0242235 0.0227991 -0.01272134 -0.004560511 0.002806113 0.008127393 0.00385889 0.005045721 0.002813641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)
            dimension=3 order=5
    DeGrooteFregly2016Muscle glmax3_r: max_isometric_force=947.7541 optimal_fiber_length=0.1757498
        tendon_slack_length=0.1083966 pennation_angle_at_optimal=0.3824161
      FunctionBasedPath path: coordinate_paths=(/jointset/hip_r/hip_flexion_r /jointset/hip_r/hip_adduction_r /jointset/hip_r/hip_rotation_r)
        length_function: MultivariatePolynomialFunction: coefficients=(0.2303513 0.02102237 0.009544434 -0.003986313 0 0 -0.0510352 -0.006712196 0.009026287 0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)
            dimension=3 order=5
    DeGrooteFregly2016Muscle glmed1_r: max_isometric_force=1093.467 optimal_fiber_length=0.08444272
        tendon_slack_length=0.06457384 pennation_angle_at_optimal=0.3165559
      FunctionBasedPath path: coordinate_paths=(/jointset/hip_r/hip_flexion_r /jointset/hip_r/hip_adduction_r /jointset/hip_r/hip_rotation_r)
        length_function: MultivariatePolynomialFunction: coefficients=(0.1392722 -0.007565641 0.007514684 0 0 0 0.05756956 0.01531688 -0.024768 0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)
            dimension=3 order=5
    DeGrooteFregly2016Muscle glmed2_r: max_isometric_force=765.0917 optimal_fiber_length=0.09346317
        tendon_slack_length=0.08394995 pennation_angle_at_optimal=0.3165559
      FunctionBasedPath path: coordinate_paths=(/jointset/hip_r/hip_flexion_r /jointset/hip_r/hip_adduction_r /jointset/hip_r/hip_rotation_r)
        length_function: MultivariatePolynomialFunction: coefficients=(0.1696914 0.01037613 0.003457797 0 0 0 0.0524338 0.01703748 -0.02533458 0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)
            dimension=3 order=5
    DeGrooteFregly2016Muscle glmed3_r: max_isometric_force=871.1993 optimal_fiber_length=0.0865134
        tendon_slack_length=0.05361394 pennation_angle_at_optimal=0.3165559
      FunctionBasedPath path: coordinate_paths=(/jointset/hip_r/hip_flexion_r /jointset/hip_r/hip_adduction_r /jointset/hip_r/hip_rotation_r)
        length_function: MultivariatePolynomialFunction: coefficients=(0.1322339 0.02435792 0.0009481605 -0.004078369 0 0 0.04342758 0.01816 -0.02421748 0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)
            dimension=3 order=5
    DeGrooteFregly2016Muscle glmin1_r: max_isometric_force=374.0459 optimal_fiber_length=0.08988951
        tendon_slack_length=0.02133908 pennation_angle_at_optimal=0.1745329
      FunctionBasedPath path: coordinate_paths=(/jointset/hip_r/hip_flexion_r /jointset/hip_r/hip_adduction_r /jointset/hip_r/hip_rotation_r)
        length_function: MultivariatePolynomialFunction: coefficients=(0.1072572 -0.01463174 0.01140953 0.003527763 0 0 0.05465406 0.00269784 -0.0259011 0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)
            dimension=3 order=5
    DeGrooteFregly2016Muscle glmin2_r: max_isometric_force=394.8197 optimal_fiber_length=0.07621243
        tendon_slack_length=0.03552143 pennation_angle_at_optimal=0
      FunctionBasedPath path: coordinate_paths=(/jointset/hip_r/hip_flexion_r /jointset/hip_r/hip_adduction_r /jointset/hip_r/hip_rotation_r)
        length_function: MultivariatePolynomialFunction: coefficients=(0.1129208 0.003488483 0.006234413 0 0 0 0.0506395 -0.004830278 -0.02634109 0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)
            dimension=3 order=5
    DeGrooteFregly2016Muscle glmin3_r: max_isometric_force=446.7738 optimal_fiber_length=0.03897948
        tendon_slack_length=0.05211987 pennation_angle_at_optimal=0.01745329
      FunctionBasedPath path: coordinate_paths=(/jointset/hip_r/hip_flexion_r /jointset/hip_r/hip_adduction_r /jointset/hip_r/hip_rotation_r)
        length_function: MultivariatePolynomialFunction: coefficients=(0.09099702 0.01469571 0 0 0.001925787 0 0.04215756 -0.002873397 -0.02093359 0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)
            dimension=3 order=5
    DeGrooteFregly2016Muscle grac_r: max_isometric_force=281.3115 optimal_fiber_length=0.225734
        tendon_slack_length=0.1704538 pennation_angle_at_optimal=0.1720016
      FunctionBasedPath path: coordinate_paths=(/jointset/hip_r/hip_flexion_r /jointset/hip_r/hip_adduction_r /jointset/hip_r/hip_rotation_r /jointset/walker_knee_r/knee_angle_r)
        length_function: MultivariatePolynomialFunction: coefficients=(0.4359466 -0.02644192 -0.009771919 0 0 0.0003794758 0.004992784 0.003458265 0 0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)
            dimension=4 order=5
    DeGrooteFregly2016Muscle iliacus_r: max_isometric_force=1021.141 optimal_fiber_length=0.1167111
        tendon_slack_length=0.1052378 pennation_angle_at_optimal=0.279914
      FunctionBasedPath path: coordinate_paths=(/jointset/hip_r/hip_flexion_r /jointset/hip_r/hip_adduction_r /jointset/hip_r/hip_rotation_r)
        length_function: MultivariatePolynomialFunction: coefficients=(0.227049 -0.01071623 4.628439e-5 0.001777721 0.0003716885 -7.763709e-5 0.006532889 -0.002092555 -0.0005504232 0.0003497951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)
            dimension=3 order=5
    DeGrooteFregly2016Muscle perbrev_r: max_isometric_force=521.2016 optimal_fiber_length=0.05426064
        tendon_slack_length=0.1763202 pennation_angle_at_optimal=0.2052361
      FunctionBasedPath path: coordinate_paths=/jointset/ankle_r/ankle_angle_r
        length_function: MultivariatePolynomialFunction: coefficients=(0.2338695 0.01042774 -0.00289605 0 0 0)
            dimension=1 order=5
    DeGrooteFregly2016Muscle perlong_r: max_isometric_force=1115.371 optimal_fiber_length=0.06056614
        tendon_slack_length=0.3960892 pennation_angle_at_optimal=0.2479525
      FunctionBasedPath path: coordinate_paths=/jointset/ankle_r/ankle_angle_r
        length_function: MultivariatePolynomialFunction: coefficients=(0.46015 0.01209801 -0.002306366 0 0 0)
            dimension=1 order=5
    DeGrooteFregly2016Muscle piri_r: max_isometric_force=1029.787 optimal_fiber_length=0.02854016
        tendon_slack_length=0.1261324 pennation_angle_at_optimal=0.1745329
      FunctionBasedPath path: coordinate_paths=(/jointset/hip_r/hip_flexion_r /jointset/hip_r/hip_adduction_r /jointset/hip_r/hip_rotation_r)
        length_function: MultivariatePolynomialFunction: coefficients=(0.1516734 0.02886571 -0.003938047 -0.002974842 0 0 0.02559162 0 -0.01592589 0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)
            dimension=3 order=5
    DeGrooteFregly2016Muscle psoas_r: max_isometric_force=1426.79 optimal_fiber_length=0.1287538
        tendon_slack_length=0.109637 pennation_angle_at_optimal=0.2155251
      FunctionBasedPath path: coordinate_paths=(/jointset/hip_r/hip_flexion_r /jointset/hip_r/hip_adduction_r /jointset/hip_r/hip_rotation_r)
        length_function: MultivariatePolynomialFunction: coefficients=(0.2516849 -0.001979929 -0.003690063 0.001135138 0.00115426 0.0002562528 -0.003354444 -0.002670774 6.295576e-5 0.001556715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)
            dimension=3 order=5
    DeGrooteFregly2016Muscle recfem_r: max_isometric_force=2191.741 optimal_fiber_length=0.07635157
        tendon_slack_length=0.4530828 pennation_angle_at_optimal=0.2170149
      FunctionBasedPath path: coordinate_paths=(/jointset/hip_r/hip_flexion_r /jointset/hip_r/hip_adduction_r /jointset/hip_r/hip_rotation_r /jointset/walker_knee_r/knee_angle_r)
        length_function: MultivariatePolynomialFunction: coefficients=(0.5155867 0.0490148 0 -0.003017599 0 0 0.001871896 0 0 0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)
            dimension=4 order=5
    DeGrooteFregly2016Muscle sart_r: max_isometric_force=249.4131 optimal_fiber_length=0.4137605
        tendon_slack_length=0.1273107 pennation_angle_at_optimal=0.02613542
      FunctionBasedPath path: coordinate_paths=(/jointset/hip_r/hip_flexion_r /jointset/hip_r/hip_adduction_r /jointset/hip_r/hip_rotation_r /jointset/walker_knee_r/knee_angle_r)
        length_function: MultivariatePolynomialFunction: coefficients=(0.6018791 -0.01441066 -0.01316224 0.002208604 0 0 0.004055201 0 0 0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)
            dimension=4 order=5
    DeGrooteFregly2016Muscle semimem_r: max_isometric_force=2200.987 optimal_fiber_length=0.08413311
        tendon_slack_length=0.3277278 pennation_angle_at_optimal=0.2545615
      FunctionBasedPath path: coordinate_paths=(/jointset/hip_r/hip_flexion_r /jointset/hip_r/hip_adduction_r /jointset/hip_r/hip_rotation_r /jointset/walker_knee_r/knee_angle_r)
        length_function: MultivariatePolynomialFunction: coefficients=(0.4044123 -0.03664637 -0.005329555 0 0 0.0005221465 0 0 0 0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)
            dimension=4 order=5
    DeGrooteFregly2016Muscle semiten_r: max_isometric_force=591.2951 optimal_fiber_length=0.1922696
        tendon_slack_length=0.2462634 pennation_angle_at_optimal=0.241295
      FunctionBasedPath path: coordinate_paths=(/jointset/hip_r/hip_flexion_r /jointset/hip_r/hip_adduction_r /jointset/hip_r/hip_rotation_r /jointset/walker_knee_r/knee_angle_r)
        length_function: MultivariatePolynomialFunction: coefficients=(0.4542504 -0.04449493 -0.007790011 0 0 0.0006833553 0 0 0 0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)
            dimension=4 order=5
    DeGrooteFregly2016Muscle soleus_r: max_isometric_force=6194.843 optimal_fiber_length=0.05243537
        tendon_slack_length=0.3352884 pennation_angle_at_optimal=0.3814289
      FunctionBasedPath path: coordinate_paths=/jointset/ankle_r/ankle_angle_r
        length_function: MultivariatePolynomialFunction: coefficients=(0.3846967 0.04970802 -0.01196926 -0.006385633 0 0)
            dimension=1 order=5
    DeGrooteFregly2016Muscle tfl_r: max_isometric_force=411.2066 optimal_fiber_length=0.09449846
        tendon_slack_length=0.4471304 pennation_angle_at_optimal=0.05235988
      FunctionBasedPath path: coordinate_paths=(/jointset/hip_r/hip_flexion_r /jointset/hip_r/hip_adduction_r /jointset/hip_r/hip_rotation_r /jointset/walker_knee_r/knee_angle_r)
        length_function: MultivariatePolynomialFunction: coefficients=(0.5467258 0.01572782 0.001499731 0 -0.001022563 0 -0.00431858 0 0 0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)
            dimension=4 order=5
    DeGrooteFregly2016Muscle tibant_r: max_isometric_force=1227.452 optimal_fiber_length=0.08073432
        tendon_slack_length=0.284238 pennation_angle_at_optimal=0.1951828
      FunctionBasedPath path: coordinate_paths=/jointset/ankle_r/ankle_angle_r
        length_function: MultivariatePolynomialFunction: coefficients=(0.3615149 -0.04827262 -0.006221175 0.005058376 0 0)
            dimension=1 order=5
    DeGrooteFregly2016Muscle tibpost_r: max_isometric_force=1730.154 optimal_fiber_length=0.04500149
        tendon_slack_length=0.3342725 pennation_angle_at_optimal=0.2264891
      FunctionBasedPath path: coordinate_paths=/jointset/ankle_r/ankle_angle_r
        length_function: MultivariatePolynomialFunction: coefficients=(0.3807472 0.01234737 -0.007194567 0 0 0)
            dimension=1 order=5
    DeGrooteFregly2016Muscle vasint_r: max_isometric_force=1697.361 optimal_fiber_length=0.1184804
        tendon_slack_length=0.2075938 pennation_angle_at_optimal=0.06309973
      FunctionBasedPath path: coordinate_paths=/jointset/walker_knee_r/knee_angle_r
        length_function: MultivariatePolynomialFunction: coefficients=(0.286357 0.04546111 0 -0.003318052 0 0)
            dimension=1 order=5
    DeGrooteFregly2016Muscle vaslat_r: max_isometric_force=5148.767 optimal_fiber_length=0.1186529
        tendon_slack_length=0.2241221 pennation_angle_at_optimal=0.2528673
      FunctionBasedPath path: coordinate_paths=/jointset/walker_knee_r/knee_angle_r
        length_function: MultivariatePolynomialFunction: coefficients=(0.3005633 0.03994064 0.01804372 -0.02140358 0.005362896 0)
            dimension=1 order=5
    DeGrooteFregly2016Muscle vasmed_r: max_isometric_force=2747.823 optimal_fiber_length=0.1117763
        tendon_slack_length=0.2113587 pennation_angle_at_optimal=0.4222225
      FunctionBasedPath path: coordinate_paths=/jointset/walker_knee_r/knee_angle_r
        length_function: MultivariatePolynomialFunction: coefficients=(0.2753071 0.04412842 0 -0.003560036 0 0)
            dimension=1 order=5
    DeGrooteFregly2016Muscle addbrev_l: max_isometric_force=625.8197 optimal_fiber_length=0.1047026
        tendon_slack_length=0.03600134 pennation_angle_at_optimal=0.1147809
      FunctionBasedPath path: coordinate_paths=(/jointset/hip_l/hip_flexion_l /jointset/hip_l/hip_adduction_l /jointset/hip_l/hip_rotation_l)
        length_function: MultivariatePolynomialFunction: coefficients=(0.142458 -0.004820235 -0.004327032 0 0 0 -0.057864 -0.002888198 0 0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)
            dimension=3 order=5
    DeGrooteFregly2016Muscle addlong_l: max_isometric_force=916.8 optimal_fiber_length=0.1063869
        tendon_slack_length=0.1295908 pennation_angle_at_optimal=0.1377704
      FunctionBasedPath path: coordinate_paths=(/jointset/hip_l/hip_flexion_l /jointset/hip_l/hip_adduction_l /jointset/hip_l/hip_rotation_l)
        length_function: MultivariatePolynomialFunction: coefficients=(0.2399972 -0.005009632 0 0 0 0 -0.06284021 0 0 0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)
            dimension=3 order=5
    DeGrooteFregly2016Muscle addmagDist_l: max_isometric_force=597.2951 optimal_fiber_length=0.1682945
        tendon_slack_length=0.08298921 pennation_angle_at_optimal=0.194705
      FunctionBasedPath path: coordinate_paths=(/jointset/hip_l/hip_flexion_l /jointset/hip_l/hip_adduction_l /jointset/hip_l/hip_rotation_l)
        length_function: MultivariatePolynomialFunction: coefficients=(0.2117538 0 -0.001985146 0 0 0 -0.05374742 0 0 0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)
            dimension=3 order=5
    DeGrooteFregly2016Muscle addmagIsch_l: max_isometric_force=597.2951 optimal_fiber_length=0.1487795
        tendon_slack_length=0.2060653 pennation_angle_at_optimal=0.1680443
      FunctionBasedPath path: coordinate_paths=(/jointset/hip_l/hip_flexion_l /jointset/hip_l/hip_adduction_l /jointset/hip_l/hip_rotation_l)
        length_function: MultivariatePolynomialFunction: coefficients=(0.323425 -0.005172299 0.002261918 0 0 0 -0.03778402 0 0 0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)
            dimension=3 order=5
    DeGrooteFregly2016Muscle addmagMid_l: max_isometric_force=597.2951 optimal_fiber_length=0.1330413
        tendon_slack_length=0.04505018 pennation_angle_at_optimal=0.2073076
      FunctionBasedPath path: coordinate_paths=(/jointset/hip_l/hip_flexion_l /jointset/hip_l/hip_adduction_l /jointset/hip_l/hip_rotation_l)
        length_function: MultivariatePolynomialFunction: coefficients=(0.1386302 0 -0.004119628 0 0 0 -0.07049037 0 0 0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)
            dimension=3 order=5
    DeGrooteFregly2016Muscle addmagProx_l: max_isometric_force=597.2951 optimal_fiber_length=0.1103272
        tendon_slack_length=0.0421292 pennation_angle_at_optimal=0.3114833
      FunctionBasedPath path: coordinate_paths=(/jointset/hip_l/hip_flexion_l /jointset/hip_l/hip_adduction_l /jointset/hip_l/hip_rotation_l)
        length_function: MultivariatePolynomialFunction: coefficients=(0.1215686 0.005159089 -0.007458929 0 0 0 -0.05272385 -0.002963992 0 0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)
            dimension=3 order=5
    DeGrooteFregly2016Muscle bflh_l: max_isometric_force=1313.184 optimal_fiber_length=0.09598134
        tendon_slack_length=0.3269845 pennation_angle_at_optimal=0.1759182
      FunctionBasedPath path: coordinate_paths=(/jointset/hip_l/hip_flexion_l /jointset/hip_l/hip_adduction_l /jointset/hip_l/hip_rotation_l /jointset/walker_knee_l/knee_angle_l)
        length_function: MultivariatePolynomialFunction: coefficients=(0.4146494 -0.03380419 0.004251565 -0.004792145 0 0.0007099115 0.007226948 0.00125305 0 0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)
            dimension=4 order=5
    DeGrooteFregly2016Muscle bfsh_l: max_isometric_force=557.1148 optimal_fiber_length=0.1104108
        tendon_slack_length=0.1059235 pennation_angle_at_optimal=0.2642232
      FunctionBasedPath path: coordinate_paths=/jointset/walker_knee_l/knee_angle_l
        length_function: MultivariatePolynomialFunction: coefficients=(0.2303112 -0.02310327 0 -0.002134176 0 0.0002180052)
            dimension=1 order=5
    DeGrooteFregly2016Muscle edl_l: max_isometric_force=603.4982 optimal_fiber_length=0.08121529
        tendon_slack_length=0.4322988 pennation_angle_at_optimal=0.2182582
      FunctionBasedPath path: coordinate_paths=/jointset/ankle_l/ankle_angle_l
        length_function: MultivariatePolynomialFunction: coefficients=(0.5124651 -0.03926354 -0.004669559 0 0 0.003980652)
            dimension=1 order=5
    DeGrooteFregly2016Muscle ehl_l: max_isometric_force=285.8675 optimal_fiber_length=0.08793189
        tendon_slack_length=0.3841675 pennation_angle_at_optimal=0.1972681
      FunctionBasedPath path: coordinate_paths=/jointset/ankle_l/ankle_angle_l
        length_function: MultivariatePolynomialFunction: coefficients=(0.4754938 -0.04261554 -0.005642802 0.002925036 0 0)
            dimension=1 order=5
    DeGrooteFregly2016Muscle fdl_l: max_isometric_force=423.177 optimal_fiber_length=0.05268679
        tendon_slack_length=0.4474512 pennation_angle_at_optimal=0.2248391
      FunctionBasedPath path: coordinate_paths=/jointset/ankle_l/ankle_angle_l
        length_function: MultivariatePolynomialFunction: coefficients=(0.5008459 0.01131229 -0.007622558 0 0 0)
            dimension=1 order=5
    DeGrooteFregly2016Muscle fhl_l: max_isometric_force=907.8393 optimal_fiber_length=0.06211099
        tendon_slack_length=0.4176165 pennation_angle_at_optimal=0.2580255
      FunctionBasedPath path: coordinate_paths=/jointset/ankle_l/ankle_angle_l
        length_function: MultivariatePolynomialFunction: coefficients=(0.4770128 0.01793772 -0.008044274 0 0 0)
            dimension=1 order=5
    DeGrooteFregly2016Muscle gaslat_l: max_isometric_force=1575.059 optimal_fiber_length=0.08102791
        tendon_slack_length=0.4391948 pennation_angle_at_optimal=0.2102268
      FunctionBasedPath path: coordinate_paths=(/jointset/walker_knee_l/knee_angle_l /jointset/ankle_l/ankle_angle_l)
        length_function: MultivariatePolynomialFunction: coefficients=(0.5295217 0.05366187 -0.009664985 -0.008049812 0.001822755 1.972871e-5 -0.02769459 -0.0004499221 0.0006285959 0.0009946347 -0.0005635343 0.01326258 -0.0006549621 -0.0002094701 -0.0005523806 -0.01424437 0.001313952 3.130202e-5 0.005285841 -0.0004498141 -0.0006134922)
            dimension=2 order=5
    DeGrooteFregly2016Muscle gasmed_l: max_isometric_force=3115.515 optimal_fiber_length=0.07004822
        tendon_slack_length=0.4594688 pennation_angle_at_optimal=0.1656816
      FunctionBasedPath path: coordinate_paths=(/jointset/walker_knee_l/knee_angle_l /jointset/ankle_l/ankle_angle_l)
        length_function: MultivariatePolynomialFunction: coefficients=(0.5365708 0.05321057 -0.00746863 -0.0074644 0 0 -0.01259536 0 0 0 0 -0.00783191 0 0 0 0 0 0 0.0006571739 0 0)
            dimension=2 order=5
    DeGrooteFregly2016Muscle glmax1_l: max_isometric_force=983.7836 optimal_fiber_length=0.1598643
        tendon_slack_length=0.09493979 pennation_angle_at_optimal=0.3540118
      FunctionBasedPath path: coordinate_paths=(/jointset/hip_l/hip_flexion_l /jointset/hip_l/hip_adduction_l /jointset/hip_l/hip_rotation_l)
        length_function: MultivariatePolynomialFunction: coefficients=(0.208111 0.02311827 0.01723021 -0.007295912 -0.00246835 0.009573238 0.01963173 0.02079039 -0.01285359 0.001951051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)
            dimension=3 order=5
    DeGrooteFregly2016Muscle glmax2_l: max_isometric_force=1406.046 optimal_fiber_length=0.1674976
        tendon_slack_length=0.1162881 pennation_angle_at_optimal=0.3673821
      FunctionBasedPath path: coordinate_paths=(/jointset/hip_l/hip_flexion_l /jointset/hip_l/hip_adduction_l /jointset/hip_l/hip_rotation_l)
        length_function: MultivariatePolynomialFunction: coefficients=(0.232869 0.02407502 0.02284482 -0.01234077 -0.002793489 0.003931855 0.008386215 0.002811957 0.004358153 0.001728503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)
            dimension=3 order=5
    DeGrooteFregly2016Muscle glmax3_l: max_isometric_force=947.7541 optimal_fiber_length=0.1757498
        tendon_slack_length=0.1083966 pennation_angle_at_optimal=0.3824161
      FunctionBasedPath path: coordinate_paths=(/jointset/hip_l/hip_flexion_l /jointset/hip_l/hip_adduction_l /jointset/hip_l/hip_rotation_l)
        length_function: MultivariatePolynomialFunction: coefficients=(0.230364 0.02118983 0.008621934 -0.005390081 0 0 -0.05081631 -0.006817599 0.008923839 0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)
            dimension=3 order=5
    DeGrooteFregly2016Muscle glmed1_l: max_isometric_force=1093.467 optimal_fiber_length=0.08444272
        tendon_slack_length=0.06457384 pennation_angle_at_optimal=0.3165559
      FunctionBasedPath path: coordinate_paths=(/jointset/hip_l/hip_flexion_l /jointset/hip_l/hip_adduction_l /jointset/hip_l/hip_rotation_l)
        length_function: MultivariatePolynomialFunction: coefficients=(0.1392082 -0.007828385 0.008115855 0 0 0 0.05770712 0.01510015 -0.02707378 0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)
            dimension=3 order=5
    DeGrooteFregly2016Muscle glmed2_l: max_isometric_force=765.0917 optimal_fiber_length=0.09346317
        tendon_slack_length=0.08394995 pennation_angle_at_optimal=0.3165559
      FunctionBasedPath path: coordinate_paths=(/jointset/hip_l/hip_flexion_l /jointset/hip_l/hip_adduction_l /jointset/hip_l/hip_rotation_l)
        length_function: MultivariatePolynomialFunction: coefficients=(0.1697128 0.01064902 0.001881295 0 0 0 0.05256934 0.01697489 -0.02695495 0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)
            dimension=3 order=5
    DeGrooteFregly2016Muscle glmed3_l: max_isometric_force=871.1993 optimal_fiber_length=0.0865134
        tendon_slack_length=0.05361394 pennation_angle_at_optimal=0.3165559
      FunctionBasedPath path: coordinate_paths=(/jointset/hip_l/hip_flexion_l /jointset/hip_l/hip_adduction_l /jointset/hip_l/hip_rotation_l)
        length_function: MultivariatePolynomialFunction: coefficients=(0.1322999 0.02351552 0 0 0 0 0.04347662 0.01864401 -0.02514965 0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)
            dimension=3 order=5
    DeGrooteFregly2016Muscle glmin1_l: max_isometric_force=374.0459 optimal_fiber_length=0.08988951
        tendon_slack_length=0.02133908 pennation_angle_at_optimal=0.1745329
      FunctionBasedPath path: coordinate_paths=(/jointset/hip_l/hip_flexion_l /jointset/hip_l/hip_adduction_l /jointset/hip_l/hip_rotation_l)
        length_function: MultivariatePolynomialFunction: coefficients=(0.1072371 -0.01452393 0.01177008 0.00476995 0 0 0.05468489 0.003439756 -0.02713822 -0.007286811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)
            dimension=3 order=5
    DeGrooteFregly2016Muscle glmin2_l: max_isometric_force=394.8197 optimal_fiber_length=0.07621243
        tendon_slack_length=0.03552143 pennation_angle_at_optimal=0
      FunctionBasedPath path: coordinate_paths=(/jointset/hip_l/hip_flexion_l /jointset/hip_l/hip_adduction_l /jointset/hip_l/hip_rotation_l)
        length_function: MultivariatePolynomialFunction: coefficients=(0.1130214 0.003657332 0.006109058 0 0 0 0.0503025 -0.004601656 -0.02432581 0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)
            dimension=3 order=5
    DeGrooteFregly2016Muscle glmin3_l: max_isometric_force=446.7738 optimal_fiber_length=0.03897948
        tendon_slack_length=0.05211987 pennation_angle_at_optimal=0.01745329
      FunctionBasedPath path: coordinate_paths=(/jointset/hip_l/hip_flexion_l /jointset/hip_l/hip_adduction_l /jointset/hip_l/hip_rotation_l)
        length_function: MultivariatePolynomialFunction: coefficients=(0.0910149 0.01464538 0 0 0 0 0.04207691 -0.002567951 -0.0208049 0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)
            dimension=3 order=5
    DeGrooteFregly2016Muscle grac_l: max_isometric_force=281.3115 optimal_fiber_length=0.2257337
        tendon_slack_length=0.1704536 pennation_angle_at_optimal=0.1720016
      FunctionBasedPath path: coordinate_paths=(/jointset/hip_l/hip_flexion_l /jointset/hip_l/hip_adduction_l /jointset/hip_l/hip_rotation_l /jointset/walker_knee_l/knee_angle_l)
        length_function: MultivariatePolynomialFunction: coefficients=(0.436002 -0.026504 -0.009800622 0 0 0.0003630384 0.005412339 0.002924632 0 0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)
            dimension=4 order=5
    DeGrooteFregly2016Muscle iliacus_l: max_isometric_force=1021.141 optimal_fiber_length=0.1167111
        tendon_slack_length=0.1052378 pennation_angle_at_optimal=0.279914
      FunctionBasedPath path: coordinate_paths=(/jointset/hip_l/hip_flexion_l /jointset/hip_l/hip_adduction_l /jointset/hip_l/hip_rotation_l)
        length_function: MultivariatePolynomialFunction: coefficients=(0.227284 -0.01060671 2.41919e-5 0.001200117 0.0001107735 0.0007687186 0.006446845 -0.0007093399 -3.088276e-5 -0.0004209227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)
            dimension=3 order=5
    DeGrooteFregly2016Muscle perbrev_l: max_isometric_force=521.2016 optimal_fiber_length=0.05426064
        tendon_slack_length=0.1763202 pennation_angle_at_optimal=0.2052361
      FunctionBasedPath path: coordinate_paths=/jointset/ankle_l/ankle_angle_l
        length_function: MultivariatePolynomialFunction: coefficients=(0.2338683 0.01040106 -0.002867264 0 0 0)
            dimension=1 order=5
    DeGrooteFregly2016Muscle perlong_l: max_isometric_force=1115.371 optimal_fiber_length=0.06056614
        tendon_slack_length=0.3960892 pennation_angle_at_optimal=0.2479525
      FunctionBasedPath path: coordinate_paths=/jointset/ankle_l/ankle_angle_l
        length_function: MultivariatePolynomialFunction: coefficients=(0.4601482 0.0120583 -0.002262752 0 0 0)
            dimension=1 order=5
    DeGrooteFregly2016Muscle piri_l: max_isometric_force=1029.787 optimal_fiber_length=0.02854016
        tendon_slack_length=0.1261324 pennation_angle_at_optimal=0.1745329
      FunctionBasedPath path: coordinate_paths=(/jointset/hip_l/hip_flexion_l /jointset/hip_l/hip_adduction_l /jointset/hip_l/hip_rotation_l)
        length_function: MultivariatePolynomialFunction: coefficients=(0.1515721 0.02847053 -0.003169575 -0.002900693 0 0 0.02559224 0.002114519 -0.01369066 0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)
            dimension=3 order=5
    DeGrooteFregly2016Muscle psoas_l: max_isometric_force=1426.79 optimal_fiber_length=0.1287538
        tendon_slack_length=0.109637 pennation_angle_at_optimal=0.2155251
      FunctionBasedPath path: coordinate_paths=(/jointset/hip_l/hip_flexion_l /jointset/hip_l/hip_adduction_l /jointset/hip_l/hip_rotation_l)
        length_function: MultivariatePolynomialFunction: coefficients=(0.2518971 -0.00197405 -0.003328114 0.0005409105 -0.0001738027 5.792701e-5 -0.003414954 -0.001970807 0.0002587032 0.002699847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)
            dimension=3 order=5
    DeGrooteFregly2016Muscle recfem_l: max_isometric_force=2191.741 optimal_fiber_length=0.07635174
        tendon_slack_length=0.4530828 pennation_angle_at_optimal=0.2170149
      FunctionBasedPath path: coordinate_paths=(/jointset/hip_l/hip_flexion_l /jointset/hip_l/hip_adduction_l /jointset/hip_l/hip_rotation_l /jointset/walker_knee_l/knee_angle_l)
        length_function: MultivariatePolynomialFunction: coefficients=(0.515645 0.04917356 0 -0.003156564 0 0 0.001790872 0 0 0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)
            dimension=4 order=5
    DeGrooteFregly2016Muscle sart_l: max_isometric_force=249.4131 optimal_fiber_length=0.4137603
        tendon_slack_length=0.1273107 pennation_angle_at_optimal=0.02613542
      FunctionBasedPath path: coordinate_paths=(/jointset/hip_l/hip_flexion_l /jointset/hip_l/hip_adduction_l /jointset/hip_l/hip_rotation_l /jointset/walker_knee_l/knee_angle_l)
        length_function: MultivariatePolynomialFunction: coefficients=(0.6018733 -0.0145011 -0.01284562 0.00202809 0 0 0.004044142 0 0 0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)
            dimension=4 order=5
    DeGrooteFregly2016Muscle semimem_l: max_isometric_force=2200.987 optimal_fiber_length=0.08413311
        tendon_slack_length=0.3277278 pennation_angle_at_optimal=0.2545615
      FunctionBasedPath path: coordinate_paths=(/jointset/hip_l/hip_flexion_l /jointset/hip_l/hip_adduction_l /jointset/hip_l/hip_rotation_l /jointset/walker_knee_l/knee_angle_l)
        length_function: MultivariatePolynomialFunction: coefficients=(0.4042616 -0.03650536 -0.005334893 0 0 0.0004984053 -0.001116959 0 0 0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)
            dimension=4 order=5
    DeGrooteFregly2016Muscle semiten_l: max_isometric_force=591.2951 optimal_fiber_length=0.1922692
        tendon_slack_length=0.2462629 pennation_angle_at_optimal=0.241295
      FunctionBasedPath path: coordinate_paths=(/jointset/hip_l/hip_flexion_l /jointset/hip_l/hip_adduction_l /jointset/hip_l/hip_rotation_l /jointset/walker_knee_l/knee_angle_l)
        length_function: MultivariatePolynomialFunction: coefficients=(0.4541925 -0.0443295 -0.007945453 0 0 0.0006648315 0 0.0007714723 0 0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)
            dimension=4 order=5
    DeGrooteFregly2016Muscle soleus_l: max_isometric_force=6194.843 optimal_fiber_length=0.05243537
        tendon_slack_length=0.3352884 pennation_angle_at_optimal=0.3814289
      FunctionBasedPath path: coordinate_paths=/jointset/ankle_l/ankle_angle_l
        length_function: MultivariatePolynomialFunction: coefficients=(0.3846892 0.04970675 -0.01188348 -0.006414943 0 0)
            dimension=1 order=5
    DeGrooteFregly2016Muscle tfl_l: max_isometric_force=411.2066 optimal_fiber_length=0.09449846
        tendon_slack_length=0.4471304 pennation_angle_at_optimal=0.05235988
      FunctionBasedPath path: coordinate_paths=(/jointset/hip_l/hip_flexion_l /jointset/hip_l/hip_adduction_l /jointset/hip_l/hip_rotation_l /jointset/walker_knee_l/knee_angle_l)
        length_function: MultivariatePolynomialFunction: coefficients=(0.5467181 0.01654536 0 0 -0.0006167339 0 -0.004400939 0 0 0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)
            dimension=4 order=5
    DeGrooteFregly2016Muscle tibant_l: max_isometric_force=1227.452 optimal_fiber_length=0.08073432
        tendon_slack_length=0.284238 pennation_angle_at_optimal=0.1951828
      FunctionBasedPath path: coordinate_paths=/jointset/ankle_l/ankle_angle_l
        length_function: MultivariatePolynomialFunction: coefficients=(0.3615035 -0.04829431 -0.006095759 0.005107289 0 0)
            dimension=1 order=5
    DeGrooteFregly2016Muscle tibpost_l: max_isometric_force=1730.154 optimal_fiber_length=0.04500149
        tendon_slack_length=0.3342725 pennation_angle_at_optimal=0.2264891
      FunctionBasedPath path: coordinate_paths=/jointset/ankle_l/ankle_angle_l
        length_function: MultivariatePolynomialFunction: coefficients=(0.3807463 0.01233004 -0.007174949 0 0 0)
            dimension=1 order=5
    DeGrooteFregly2016Muscle vasint_l: max_isometric_force=1697.361 optimal_fiber_length=0.1184804
        tendon_slack_length=0.2075938 pennation_angle_at_optimal=0.06309973
      FunctionBasedPath path: coordinate_paths=/jointset/walker_knee_l/knee_angle_l
        length_function: MultivariatePolynomialFunction: coefficients=(0.286368 0.0452631 0 -0.003169961 0 0)
            dimension=1 order=5
    DeGrooteFregly2016Muscle vaslat_l: max_isometric_force=5148.767 optimal_fiber_length=0.1186529
        tendon_slack_length=0.2241221 pennation_angle_at_optimal=0.2528673
      FunctionBasedPath path: coordinate_paths=/jointset/walker_knee_l/knee_angle_l
        length_function: MultivariatePolynomialFunction: coefficients=(0.3005808 0.04010165 0.01675967 -0.01957424 0.004678097 0)
            dimension=1 order=5
    DeGrooteFregly2016Muscle vasmed_l: max_isometric_force=2747.823 optimal_fiber_length=0.1117763
        tendon_slack_length=0.2113587 pennation_angle_at_optimal=0.4222225
      FunctionBasedPath path: coordinate_paths=/jointset/walker_knee_l/knee_angle_l
        length_function: MultivariatePolynomialFunction: coefficients=(0.2753309 0.043836 0 -0.003338509 0 0)
            dimension=1 order=5
    ObjectGroup right_leg
    ObjectGroup left_leg
    ObjectGroup hip_add_r
    ObjectGroup hip_abd_r
    ObjectGroup hip_flex_r
    ObjectGroup hip_ext_r
    ObjectGroup hip_inrot_r
    ObjectGroup hip_exrot_r
    ObjectGroup knee_flex_r
    ObjectGroup knee_ext_r
    ObjectGroup ankle_df_r
    ObjectGroup ankle_pf_r
    ObjectGroup everter_r
    ObjectGroup inverter_r
    ObjectGroup hip_add_l
    ObjectGroup hip_abd_l
    ObjectGroup hip_flex_l
    ObjectGroup hip_ext_l
    ObjectGroup hip_exrot_l
    ObjectGroup hip_inrot_l
    ObjectGroup knee_flex_l
    ObjectGroup knee_ext_l
    ObjectGroup ankle_df_l
    ObjectGroup ankle_pf_l
    ObjectGroup everter_l
    ObjectGroup inverter_l
  MarkerSet:
    Marker Head: torso (0 0.694622 0) fixed=true
    Marker R.Shoulder: torso (-0.001369502 0.4331764 0.1668551) fixed=true
    Marker L.Shoulder: torso (-0.0001479558 0.4340449 -0.1682384) fixed=true
    Marker R.Clavicle: torso (0.0598078 0.398805 0.02850312) fixed=true
    Marker L.Clavicle: torso (0.06001048 0.3988199 -0.02934716) fixed=true
    Marker R.Biceps: humerus_r (0.0494266 -0.2134142 0.009335888)
    Marker R.Elbow: humerus_r (0.01240887 -0.3138289 0.03492811) fixed=true
    Marker R.MElbow: humerus_r (0 -0.3141147 -0.0434917) fixed=true
    Marker R.Forearm: ulna_r (0.005902111 -0.1330065 0.04807742)
    Marker R.Wrist: radius_r (-0.03295266 -0.2401653 0.006878553) fixed=true
    Marker L.Biceps: humerus_l (0.03091412 -0.1774577 -0.02991671)
    Marker L.Elbow: humerus_l (0.01322742 -0.3134507 -0.03417211) fixed=true
    Marker L.MElbow: humerus_l (0 -0.3141147 0.0434917) fixed=true
    Marker L.Forearm: ulna_l (0.004072261 -0.1275586 -0.0533974)
    Marker L.Wrist: radius_l (-0.03221424 -0.2391484 -0.006393874) fixed=true
    Marker R.ASIS: pelvis (0.0140215 0.03461817 0.1355426) fixed=true
    Marker L.ASIS: pelvis (0.01211335 0.03297939 -0.1362051) fixed=true
    Marker S2: pelvis (-0.2076678 0.02163451 0.001689314) fixed=true
    Marker R.PSIS: pelvis (-0.2013958 0.01064373 0.05118224)
    Marker L.PSIS: pelvis (-0.2054527 0.006648139 -0.03299402)
    Marker R_HJC: femur_r (0 0 0) fixed=true
    Marker L_HJC: femur_l (0 0 0) fixed=true
    Marker R.TH1: femur_r (0.06609537 -0.1481522 0.09894977)
    Marker R.TH2: femur_r (-0.04256604 -0.1581046 0.1241814)
    Marker R.TH3: femur_r (-0.04752491 -0.2794275 0.08751113)
    Marker R.Knee: femur_r (-0.001578751 -0.3936643 0.04960325) fixed=true
    Marker R.MKnee: femur_r (0.005243464 -0.3904532 -0.05261382) fixed=true
    Marker R.SH1: tibia_r (0.00618929 -0.1006936 0.05709899)
    Marker R.SH2: tibia_r (0.009111262 -0.2113075 0.06512998)
    Marker R.SH3: tibia_r (-0.07577712 -0.1079866 0.06171218)
    Marker R.SH4: tibia_r (-0.0727502 -0.2261306 0.06421453)
    Marker R.Ankle: tibia_r (-0.006798863 -0.4377476 0.05842767) fixed=true
    Marker R.MAnkle: tibia_r (0.006981052 -0.44052 -0.04313838) fixed=true
    Marker R.Toe: toes_r (0.0882065 0.0436068 -0.0231762) fixed=true
    Marker R.MT5: toes_r (0.00470394 0.0235564 0.0661423) fixed=true
    Marker R.Heel: calcn_r (-0.02184655 0.0228202 -0.01241861) fixed=true
    Marker L.TH1: femur_l (0.1047622 -0.1328653 -0.06137889)
    Marker L.TH2: femur_l (0.09793556 -0.2587879 -0.03892303)
    Marker L.TH3: femur_l (0.01233661 -0.1276965 -0.1211917)
    Marker L.TH4: femur_l (-0.01353609 -0.2538284 -0.08732385)
    Marker L.Knee: femur_l (-0.00146749 -0.392773 -0.04900244) fixed=true
    Marker L.MKnee: femur_l (0.005243464 -0.3904532 0.05261382) fixed=true
    Marker L.SH1: tibia_l (0.02613386 -0.1072382 -0.04295203)
    Marker L.SH2: tibia_l (-0.06789269 -0.1008819 -0.06446122)
    Marker L.SH3: tibia_l (-0.07087587 -0.2153663 -0.06141118)
    Marker L.Ankle: tibia_l (-0.005851133 -0.4376387 -0.05853443) fixed=true
    Marker L.MAnkle: tibia_l (0.006981052 -0.44052 0.04313838) fixed=true
    Marker L.Toe: toes_l (0.0882065 0.0436068 0.0231762) fixed=true
    Marker L.Heel: calcn_l (-0.02180087 0.02267972 0.01190861) fixed=true
    Marker L.MT5: toes_l (0.00470394 0.0235564 -0.0661423) fixed=true
    Marker MidPSIS: pelvis (-0.17715 0.04295646 0) fixed=true
    Marker MidASIS: pelvis (0.01495422 0.033913 0) fixed=true
    Marker MidClavicle: torso (0.05958427 0.3991485 0) fixed=true
    Marker L.AnkleJoint: tibia_l (0.0005817543 -0.44052 -0.008514153) fixed=true
    Marker L.KneeJoint: femur_l (0.002621732 -0.3919137 0.001578415) fixed=true
    Marker L.HeelGround: calcn_l (-0.02311217 -0.005585424 0.01305253) fixed=true
    Marker L.MT5Ground: toes_l (0.00609739 -0.00358542 -0.0641826) fixed=true
    Marker L.ToeGround: toes_l (0.08699 -0.00358542 0.021964) fixed=true
    Marker L.AnkleJointGround: tibia_l (0.0005817543 -0.5197741 -0.008514153) fixed=true
    Marker R.AnkleJoint: tibia_r (0.0005817543 -0.44052 0.008514153) fixed=true
    Marker R.KneeJoint: femur_r (0.002621732 -0.3919137 -0.001578415) fixed=true
    Marker R.HeelGround: calcn_r (-0.02311217 -0.005585424 -0.01305253) fixed=true
    Marker R.MT5Ground: toes_r (0.00609739 -0.00358542 0.0641826) fixed=true
    Marker R.ToeGround: toes_r (0.08699 -0.00358542 -0.021964) fixed=true
    Marker R.AnkleJointGround: tibia_r (0.0005817543 -0.5197741 0.008514153) fixed=true
    ObjectGroup anatomical: members=(R.Shoulder R.Clavicle R.Elbow R.MElbow R.Wrist R.ASIS R.PSIS R_HJC R.Knee R.MKnee R.Ankle R.MAnkle R.Toe R.Heel R.MT5 L.Shoulder L.Clavicle L.Elbow L.MElbow L.Wrist L.ASIS L.PSIS R_HJC L.Knee L.MKnee L.Ankle L.MAnkle L.Toe L.Heel L.MT5 S2)
    ObjectGroup tracking: members=(R.Biceps R.Forearm R.TH1 R.TH2 R.TH3 R.TH4 R.SH1 R.SH2 R.SH3 R.SH4 L.Biceps L.Forearm L.TH1 L.TH2 L.TH3 L.TH4 L.SH1 L.SH2 L.SH3 L.SH4)
